// SBML level 2 version 4

model SBTAB_Findsim()

  // Compartments:
  compartment Comp1 = 1e-15 liter; Comp1 is "Cell";

  // Species:
  species PKC_Ca in Comp1 = 0;
  species PKC_DAG_AA_p in Comp1 = 0;
  species PKC_Ca_AA_p in Comp1 = 0;
  species PKC_Ca_memb_p in Comp1 = 0;
  species PKC_DAG_memb_p in Comp1 = 0;
  species PKC_basal_p in Comp1 = 2e-5;
  species PKC_AA_p in Comp1 = 0;
  species PKC_Ca_DAG in Comp1 = 0;
  species PKC_DAG in Comp1 = 0;
  species PKC_DAG_AA in Comp1 = 0;
  species PKC_cytosolic in Comp1 = 0.001;
  species $PKC_active in Comp1; PKC_active is "PKC_active_value";
  species PLA2_cytosolic in Comp1 = 0.0004;
  species PLA2_Ca_p in Comp1 = 0;
  species PIP2_PLA2_p in Comp1 = 0;
  species PIP2_Ca_PLA2_p in Comp1 = 0;
  species DAG_Ca_PLA2_p in Comp1 = 0;
  species APC in Comp1 = 0.030001;
  species PLA2_p_Ca in Comp1 = 0;
  species PLA2_p in Comp1 = 0;
  species Arachidonic_Acid in Comp1 = 0;
  species PLC in Comp1 = 0.0008;
  species Inositol in Comp1 = 0;
  species PLC_Ca in Comp1 = 0;
  species PLC_Ca_Gq in Comp1 = 0;
  species PLC_Gq in Comp1 = 0;
  species PC in Comp1 = 0;
  species DAG in Comp1 = 0;
  species IP3 in Comp1 = 0.00073;
  species PIP2 in Comp1 = 0.007;
  species MAPK_p_p in Comp1 = 0;
  species craf_1 in Comp1 = 0.0002;
  species craf_1_p in Comp1 = 0;
  species MAPKK in Comp1 = 0.00018001;
  species MAPK in Comp1 = 0.00036;
  species craf_1_p_p in Comp1 = 0;
  species MAPK_p in Comp1 = 0;
  species MAPKK_p_p in Comp1 = 0;
  species MAPKK_p in Comp1 = 0;
  species Raf_p_GTP_Ras in Comp1 = 0;
  species craf_1_p_ser259 in Comp1 = 0;
  species inact_GEF in Comp1 = 0.0001;
  species GEF_p in Comp1 = 0;
  species GTP_Ras in Comp1 = 0;
  species GDP_Ras in Comp1 = 0.0005;
  species GAP_p in Comp1 = 0;
  species GAP in Comp1 = 2e-5;
  species inact_GEF_p in Comp1 = 0;
  species CaM_GEF in Comp1 = 0;
  species EGFR in Comp1 = 0.00016666;
  species L_EGFR in Comp1 = 0;
  species EGF in Comp1 = 0;
  species Internal_L_EGFR in Comp1 = 0;
  species SHC_p_Sos_Grb2 in Comp1 = 0;
  species SHC in Comp1 = 0.00050001;
  species SHC_p in Comp1 = 0;
  species Sos_p_Grb2 in Comp1 = 0;
  species Grb2 in Comp1 = 0.001;
  species Sos_Grb2 in Comp1 = 0;
  species Sos_p in Comp1 = 0;
  species Sos in Comp1 = 0.0001;
  species SHC_p_Grb2_clx in Comp1 = 0;
  species PLC_g in Comp1 = 0.00082001;
  species PLC_g_p in Comp1 = 0;
  species Ca_PLC_g in Comp1 = 0;
  species Ca_PLC_g_p in Comp1 = 0;
  species PLCg_basal in Comp1 = 7.0002e-7;
  species MKP_1 in Comp1 = 2e-5;
  species PPhosphatase2A in Comp1 = 0.00026001;
  species Ca in Comp1 = 8e-5;
  species PKC_act_raf_cplx in Comp1 = 0;
  species PKC_inact_GAP_cplx in Comp1 = 0;
  species PKC_act_GEF_cplx in Comp1 = 0;
  species kenz_cplx in Comp1 = 0;
  species kenz_cplx_1 in Comp1 = 0;
  species kenz_cplx_2 in Comp1 = 0;
  species kenz_cplx_3 in Comp1 = 0;
  species kenz_cplx_4 in Comp1 = 0;
  species PLC_Ca_cplx in Comp1 = 0;
  species PLCb_Ca_Gq_cplx in Comp1 = 0;
  species MAPK_p_p_cplx in Comp1 = 0;
  species MAPK_p_p_feedback_cplx in Comp1 = 0;
  species phosph_Sos_cplx in Comp1 = 0;
  species MAPKKtyr_cplx in Comp1 = 0;
  species MAPKKthr_cplx in Comp1 = 0;
  species Raf_p_GTP_Ras_1_cplx in Comp1 = 0;
  species Raf_p_GTP_Ras_2_cplx in Comp1 = 0;
  species basal_GEF_activity_cplx in Comp1 = 0;
  species GEF_p_act_Ras_cplx in Comp1 = 0;
  species GAP_inact_Ras_cplx in Comp1 = 0;
  species CaM_GEF_act_Ras_cplx in Comp1 = 0;
  species Ca_PLC_g_phospho_cplx in Comp1 = 0;
  species SHC_phospho_cplx in Comp1 = 0;
  species Sos_Ras_GEF_cplx in Comp1 = 0;
  species PLC_g_phospho_cplx in Comp1 = 0;
  species MKP1_tyr_deph_cplx in Comp1 = 0;
  species MKP1_thr_deph_cplx in Comp1 = 0;
  species craf_dephospho_cplx in Comp1 = 0;
  species MAPKK_dephospho_cplx in Comp1 = 0;
  species MAPKK_dephospho_ser_cplx in Comp1 = 0;
  species craf_p_p_dephospho_cplx in Comp1 = 0;
  species deph_raf_ser259_cplx in Comp1 = 0;

  // Parameters:
  kf_R1 = 599.9292 liter_per_millimole_second;
  kr_R1 = 0.5 one_over_second;
  kf_R2 = 7.999816 liter_per_millimole_second;
  kr_R2 = 8.634755 one_over_second;
  kf_R3 = 1.270486 one_over_second;
  kr_R3 = 3.502596 one_over_second;
  kf_R4 = 1 one_over_second;
  kr_R4 = 0.1 one_over_second;
  kf_R5 = 1.20001 liter_per_millimole_second;
  kr_R5 = 0.1 one_over_second;
  kf_R6 = 2 one_over_second;
  kr_R6 = 0.2 one_over_second;
  kf_R7 = 1 one_over_second;
  kr_R7 = 50.00345 one_over_second;
  kf_R8 = 0.1199997 liter_per_millimole_second;
  kr_R8 = 0.1 one_over_second;
  kf_R9 = 0.5999983 liter_per_millimole_second;
  kr_R9 = 0.1 one_over_second;
  kf_R10 = 18.00114 liter_per_millimole_second;
  kr_R10 = 2 one_over_second;
  kf_R11 = 1000 liter_per_millimole_second;
  kr_R11 = 0.1 one_over_second;
  kf_R12 = 2.999991 liter_per_millimole_second;
  kr_R12 = 4 one_over_second;
  kf_R13 = 0.4 one_over_second;
  kf_R14 = 5999.292 liter_per_millimole_second;
  kr_R14 = 0.1 one_over_second;
  kf_R15 = 0.1700004 one_over_second;
  kf_R16 = 2999.853 liter_per_millimole_second;
  kr_R16 = 1 one_over_second;
  kf_R17 = 2.5 one_over_second;
  kf_R18 = 0.1499996 one_over_second;
  kf_R19 = 29998.53 liter_per_millimole_second;
  kr_R19 = 1 one_over_second;
  kf_R20 = 10000 liter_per_millimole_second;
  kr_R20 = 0.5 one_over_second;
  kf_R21 = 1 one_over_second;
  kf_R22 = 0.0001 one_over_second;
  kf_R23 = 0.1 one_over_second;
  kf_R24 = 1 one_over_second;
  kf_R25 = 4199.523 liter_per_millimole_second;
  kr_R25 = 0.25 one_over_second;
  kf_R26 = 0.001999862 one_over_second;
  kr_R26 = 0.0003299894 one_over_second;
  kf_R27 = 0.2 one_over_second;
  kf_R28 = 500.0345 liter_per_millimole_second;
  kr_R28 = 0.1 one_over_second;
  kf_R29 = 24.9977 liter_per_millimole_second;
  kr_R29 = 0.01679964 one_over_second;
  kf_R30 = 0.001 one_over_second;
  kf_R31 = 24.9977 liter_per_millimole_second;
  kr_R31 = 0.01679964 one_over_second;
  kf_R32 = 1000 liter_per_millimole_second;
  kr_R32 = 1 one_over_second;
  kf_R33 = 180011.4 liter_per_millimole_second;
  kr_R33 = 10 one_over_second;
  kf_R34 = 12000.52 liter_per_millimole_second;
  kr_R34 = 10 one_over_second;
  kf_R35 = 0.05000345 one_over_second;
  kf_R36 = 0.07000032 one_over_second;
  kf_R37 = 949.7297 liter_per_millimole_second;
  kr_R37 = 15.99926 one_over_second;
  kf_R38 = 4 one_over_second;
  kf_R39 = 5657.18 liter_per_millimole_second;
  kr_R39 = 15.99926 one_over_second;
  kf_R40 = 4 one_over_second;
  kf_R41 = 5657.18 liter_per_millimole_second;
  kr_R41 = 15.99926 one_over_second;
  kf_R42 = 4 one_over_second;
  kf_R43 = 1272.624 liter_per_millimole_second;
  kr_R43 = 21.6023 one_over_second;
  kf_R44 = 5.399953 one_over_second;
  kf_R45 = 2601.956 liter_per_millimole_second;
  kr_R45 = 44.15704 one_over_second;
  kf_R46 = 11.04079 one_over_second;
  kf_R47 = 8483.987 liter_per_millimole_second;
  kr_R47 = 144.0124 one_over_second;
  kf_R48 = 35.99979 one_over_second;
  kf_R49 = 14141.65 liter_per_millimole_second;
  kr_R49 = 239.9938 one_over_second;
  kf_R50 = 60.00674 one_over_second;
  kf_R51 = 28281.34 liter_per_millimole_second;
  kr_R51 = 479.9544 one_over_second;
  kf_R52 = 120.0052 one_over_second;
  kf_R53 = 2375.746 liter_per_millimole_second;
  kr_R53 = 40.00369 one_over_second;
  kf_R54 = 10 one_over_second;
  kf_R55 = 45248.06 liter_per_millimole_second;
  kr_R55 = 191.9995 one_over_second;
  kf_R56 = 47.99544 one_over_second;
  kf_R57 = 3677.054 liter_per_millimole_second;
  kr_R57 = 80.00184 one_over_second;
  kf_R58 = 19.99862 one_over_second;
  kf_R59 = 1838.231 liter_per_millimole_second;
  kr_R59 = 40.00369 one_over_second;
  kf_R60 = 10 one_over_second;
  kf_R61 = 18382.31 liter_per_millimole_second;
  kr_R61 = 40.00369 one_over_second;
  kf_R62 = 10 one_over_second;
  kf_R63 = 15272.14 liter_per_millimole_second;
  kr_R63 = 0.5999983 one_over_second;
  kf_R64 = 0.1499996 one_over_second;
  kf_R65 = 15272.14 liter_per_millimole_second;
  kr_R65 = 0.5999983 one_over_second;
  kf_R66 = 0.1499996 one_over_second;
  kf_R67 = 8887.917 liter_per_millimole_second;
  kr_R67 = 1.199999 one_over_second;
  kf_R68 = 0.2999991 one_over_second;
  kf_R69 = 8887.917 liter_per_millimole_second;
  kr_R69 = 1.199999 one_over_second;
  kf_R70 = 0.2999991 one_over_second;
  kf_R71 = 9.471963 liter_per_millimole_second;
  kr_R71 = 0.08000184 one_over_second;
  kf_R72 = 0.01999862 one_over_second;
  kf_R73 = 186.6809 liter_per_millimole_second;
  kr_R73 = 0.08000184 one_over_second;
  kf_R74 = 0.01999862 one_over_second;
  kf_R75 = 46655.19 liter_per_millimole_second;
  kr_R75 = 40.00369 one_over_second;
  kf_R76 = 10 one_over_second;
  kf_R77 = 1866.809 liter_per_millimole_second;
  kr_R77 = 0.8 one_over_second;
  kf_R78 = 0.2 one_over_second;
  kf_R79 = 2828.134 liter_per_millimole_second;
  kr_R79 = 0.8 one_over_second;
  kf_R80 = 0.2 one_over_second;
  kf_R81 = 1131.358 liter_per_millimole_second;
  kr_R81 = 0.8 one_over_second;
  kf_R82 = 0.2 one_over_second;
  kf_R83 = 1866.809 liter_per_millimole_second;
  kr_R83 = 0.8 one_over_second;
  kf_R84 = 0.2 one_over_second;
  kf_R85 = 0.09722994 one_over_second;
  kr_R85 = 13.9991 millimole_per_liter;
  kf_R86 = 0.01979247 one_over_second;
  kr_R86 = 57.0033 millimole_per_liter;
  kf_R87 = 7972.6 liter_per_millimole_second;
  kr_R87 = 2 one_over_second;
  kf_R88 = 0.5 one_over_second;
  kf_R89 = 2714.563 liter_per_millimole_second;
  kr_R89 = 15.99926 one_over_second;
  kf_R90 = 4 one_over_second;
  kf_R91 = 2714.563 liter_per_millimole_second;
  kr_R91 = 15.99926 one_over_second;
  kf_R92 = 4 one_over_second;
  kf_R93 = 1866.809 liter_per_millimole_second;
  kr_R93 = 24.9977 one_over_second;
  kf_R94 = 5.999983 one_over_second;
  kf_R95 = 1866.809 liter_per_millimole_second;
  kr_R95 = 24.9977 one_over_second;
  kf_R96 = 5.999983 one_over_second;
  kf_R97 = 1866.809 liter_per_millimole_second;
  kr_R97 = 24.9977 one_over_second;
  kf_R98 = 5.999983 one_over_second;
  kf_R99 = 1866.809 liter_per_millimole_second;
  kr_R99 = 24.9977 one_over_second;
  kf_R100 = 5.999983 one_over_second;
  kf_R101 = 1806.342 liter_per_millimole_second;
  kr_R101 = 23.99938 one_over_second;
  kf_R102 = 5.999983 one_over_second;

  // Assignment rules:
  PKC_active := PKC_DAG_AA_p + PKC_Ca_memb_p + PKC_Ca_AA_p + PKC_DAG_memb_p + PKC_basal_p + PKC_AA_p;

  // Reactions:
  ReactionFlux0: Ca + PKC_cytosolic -> PKC_Ca; kf_R1*Ca*PKC_cytosolic - kr_R1*PKC_Ca;
  ReactionFlux1: DAG + PKC_Ca -> PKC_Ca_DAG; kf_R2*DAG*PKC_Ca - kr_R2*PKC_Ca_DAG;
  ReactionFlux2: PKC_Ca -> PKC_Ca_memb_p; kf_R3*PKC_Ca - kr_R3*PKC_Ca_memb_p;
  ReactionFlux3: PKC_Ca_DAG -> PKC_DAG_memb_p; kf_R4*PKC_Ca_DAG - kr_R4*PKC_DAG_memb_p;
  ReactionFlux4: Arachidonic_Acid + PKC_Ca -> PKC_Ca_AA_p; kf_R5*Arachidonic_Acid*PKC_Ca - kr_R5*PKC_Ca_AA_p;
  ReactionFlux5: PKC_DAG_AA -> PKC_DAG_AA_p; kf_R6*PKC_DAG_AA - kr_R6*PKC_DAG_AA_p;
  ReactionFlux6: PKC_cytosolic -> PKC_basal_p; kf_R7*PKC_cytosolic - kr_R7*PKC_basal_p;
  ReactionFlux7: PKC_cytosolic + Arachidonic_Acid -> PKC_AA_p; kf_R8*PKC_cytosolic*Arachidonic_Acid - kr_R8*PKC_AA_p;
  ReactionFlux8: PKC_cytosolic + DAG -> PKC_DAG; kf_R9*PKC_cytosolic*DAG - kr_R9*PKC_DAG;
  ReactionFlux9: Arachidonic_Acid + PKC_DAG -> PKC_DAG_AA; kf_R10*Arachidonic_Acid*PKC_DAG - kr_R10*PKC_DAG_AA;
  ReactionFlux10: Ca + PLA2_cytosolic -> PLA2_Ca_p; kf_R11*Ca*PLA2_cytosolic - kr_R11*PLA2_Ca_p;
  ReactionFlux11: PLA2_Ca_p + DAG -> DAG_Ca_PLA2_p; kf_R12*PLA2_Ca_p*DAG - kr_R12*DAG_Ca_PLA2_p;
  ReactionFlux12: Arachidonic_Acid -> APC; kf_R13*Arachidonic_Acid;
  ReactionFlux13: Ca + PLA2_p -> PLA2_p_Ca; kf_R14*Ca*PLA2_p - kr_R14*PLA2_p_Ca;
  ReactionFlux14: PLA2_p -> PLA2_cytosolic; kf_R15*PLA2_p;
  ReactionFlux15: PLC + Ca -> PLC_Ca; kf_R16*PLC*Ca - kr_R16*PLC_Ca;
  ReactionFlux16: IP3 -> Inositol; kf_R17*IP3;
  ReactionFlux17: DAG -> PC; kf_R18*DAG;
  ReactionFlux18: PLC_Gq + Ca -> PLC_Ca_Gq; kf_R19*PLC_Gq*Ca - kr_R19*PLC_Ca_Gq;
  ReactionFlux19: GTP_Ras + craf_1_p -> Raf_p_GTP_Ras; kf_R20*GTP_Ras*craf_1_p - kr_R20*Raf_p_GTP_Ras;
  ReactionFlux20: GEF_p -> inact_GEF; kf_R21*GEF_p;
  ReactionFlux21: GTP_Ras -> GDP_Ras; kf_R22*GTP_Ras;
  ReactionFlux22: GAP_p -> GAP; kf_R23*GAP_p;
  ReactionFlux23: inact_GEF_p -> inact_GEF; kf_R24*inact_GEF_p;
  ReactionFlux24: EGFR + EGF -> L_EGFR; kf_R25*EGFR*EGF - kr_R25*L_EGFR;
  ReactionFlux25: L_EGFR -> Internal_L_EGFR; kf_R26*L_EGFR - kr_R26*Internal_L_EGFR;
  ReactionFlux26: SHC_p -> SHC; kf_R27*SHC_p;
  ReactionFlux27: Sos_Grb2 + SHC_p -> SHC_p_Sos_Grb2; kf_R28*Sos_Grb2*SHC_p - kr_R28*SHC_p_Sos_Grb2;
  ReactionFlux28: Grb2 + Sos_p -> Sos_p_Grb2; kf_R29*Grb2*Sos_p - kr_R29*Sos_p_Grb2;
  ReactionFlux29: Sos_p -> Sos; kf_R30*Sos_p;
  ReactionFlux30: Grb2 + Sos -> Sos_Grb2; kf_R31*Grb2*Sos - kr_R31*Sos_Grb2;
  ReactionFlux31: Grb2 + SHC_p -> SHC_p_Grb2_clx; kf_R32*Grb2*SHC_p - kr_R32*SHC_p_Grb2_clx;
  ReactionFlux32: Ca + PLC_g -> Ca_PLC_g; kf_R33*Ca*PLC_g - kr_R33*Ca_PLC_g;
  ReactionFlux33: Ca + PLC_g_p -> Ca_PLC_g_p; kf_R34*Ca*PLC_g_p - kr_R34*Ca_PLC_g_p;
  ReactionFlux34: Ca_PLC_g_p -> Ca_PLC_g; kf_R35*Ca_PLC_g_p;
  ReactionFlux35: PLC_g_p -> PLC_g; kf_R36*PLC_g_p;
  ReactionFlux36: craf_1 + $PKC_active -> PKC_act_raf_cplx; kf_R37*craf_1*PKC_active - kr_R37*PKC_act_raf_cplx;
  ReactionFlux37: PKC_act_raf_cplx -> $PKC_active + craf_1_p; kf_R38*PKC_act_raf_cplx;
  ReactionFlux38: GAP + $PKC_active -> PKC_inact_GAP_cplx; kf_R39*GAP*PKC_active - kr_R39*PKC_inact_GAP_cplx;
  ReactionFlux39: PKC_inact_GAP_cplx -> GAP_p + $PKC_active; kf_R40*PKC_inact_GAP_cplx;
  ReactionFlux40: inact_GEF + $PKC_active -> PKC_act_GEF_cplx; kf_R41*inact_GEF*PKC_active - kr_R41*PKC_act_GEF_cplx;
  ReactionFlux41: PKC_act_GEF_cplx -> GEF_p + $PKC_active; kf_R42*PKC_act_GEF_cplx;
  ReactionFlux42: PLA2_Ca_p + APC -> kenz_cplx; kf_R43*PLA2_Ca_p*APC - kr_R43*kenz_cplx;
  ReactionFlux43: kenz_cplx -> PLA2_Ca_p + Arachidonic_Acid; kf_R44*kenz_cplx;
  ReactionFlux44: APC + PIP2_PLA2_p -> kenz_cplx_1; kf_R45*APC*PIP2_PLA2_p - kr_R45*kenz_cplx_1;
  ReactionFlux45: kenz_cplx_1 -> PIP2_PLA2_p + Arachidonic_Acid; kf_R46*kenz_cplx_1;
  ReactionFlux46: APC + PIP2_Ca_PLA2_p -> kenz_cplx_2; kf_R47*APC*PIP2_Ca_PLA2_p - kr_R47*kenz_cplx_2;
  ReactionFlux47: kenz_cplx_2 -> PIP2_Ca_PLA2_p + Arachidonic_Acid; kf_R48*kenz_cplx_2;
  ReactionFlux48: APC + DAG_Ca_PLA2_p -> kenz_cplx_3; kf_R49*APC*DAG_Ca_PLA2_p - kr_R49*kenz_cplx_3;
  ReactionFlux49: kenz_cplx_3 -> DAG_Ca_PLA2_p + Arachidonic_Acid; kf_R50*kenz_cplx_3;
  ReactionFlux50: APC + PLA2_p_Ca -> kenz_cplx_4; kf_R51*APC*PLA2_p_Ca - kr_R51*kenz_cplx_4;
  ReactionFlux51: kenz_cplx_4 -> PLA2_p_Ca + Arachidonic_Acid; kf_R52*kenz_cplx_4;
  ReactionFlux52: PIP2 + PLC_Ca -> PLC_Ca_cplx; kf_R53*PIP2*PLC_Ca - kr_R53*PLC_Ca_cplx;
  ReactionFlux53: PLC_Ca_cplx -> PLC_Ca + DAG + IP3; kf_R54*PLC_Ca_cplx;
  ReactionFlux54: PIP2 + PLC_Ca_Gq -> PLCb_Ca_Gq_cplx; kf_R55*PIP2*PLC_Ca_Gq - kr_R55*PLCb_Ca_Gq_cplx;
  ReactionFlux55: PLCb_Ca_Gq_cplx -> DAG + PLC_Ca_Gq + IP3; kf_R56*PLCb_Ca_Gq_cplx;
  ReactionFlux56: MAPK_p_p + PLA2_cytosolic -> MAPK_p_p_cplx; kf_R57*MAPK_p_p*PLA2_cytosolic - kr_R57*MAPK_p_p_cplx;
  ReactionFlux57: MAPK_p_p_cplx -> MAPK_p_p + PLA2_p; kf_R58*MAPK_p_p_cplx;
  ReactionFlux58: MAPK_p_p + craf_1_p -> MAPK_p_p_feedback_cplx; kf_R59*MAPK_p_p*craf_1_p - kr_R59*MAPK_p_p_feedback_cplx;
  ReactionFlux59: MAPK_p_p_feedback_cplx -> MAPK_p_p + craf_1_p_p; kf_R60*MAPK_p_p_feedback_cplx;
  ReactionFlux60: MAPK_p_p + Sos -> phosph_Sos_cplx; kf_R61*MAPK_p_p*Sos - kr_R61*phosph_Sos_cplx;
  ReactionFlux61: phosph_Sos_cplx -> MAPK_p_p + Sos_p; kf_R62*phosph_Sos_cplx;
  ReactionFlux62: MAPKK_p_p + MAPK -> MAPKKtyr_cplx; kf_R63*MAPKK_p_p*MAPK - kr_R63*MAPKKtyr_cplx;
  ReactionFlux63: MAPKKtyr_cplx -> MAPKK_p_p + MAPK_p; kf_R64*MAPKKtyr_cplx;
  ReactionFlux64: MAPKK_p_p + MAPK_p -> MAPKKthr_cplx; kf_R65*MAPKK_p_p*MAPK_p - kr_R65*MAPKKthr_cplx;
  ReactionFlux65: MAPKKthr_cplx -> MAPKK_p_p + MAPK_p_p; kf_R66*MAPKKthr_cplx;
  ReactionFlux66: MAPKK + Raf_p_GTP_Ras -> Raf_p_GTP_Ras_1_cplx; kf_R67*MAPKK*Raf_p_GTP_Ras - kr_R67*Raf_p_GTP_Ras_1_cplx;
  ReactionFlux67: Raf_p_GTP_Ras_1_cplx -> MAPKK_p + Raf_p_GTP_Ras; kf_R68*Raf_p_GTP_Ras_1_cplx;
  ReactionFlux68: MAPKK_p + Raf_p_GTP_Ras -> Raf_p_GTP_Ras_2_cplx; kf_R69*MAPKK_p*Raf_p_GTP_Ras - kr_R69*Raf_p_GTP_Ras_2_cplx;
  ReactionFlux69: Raf_p_GTP_Ras_2_cplx -> MAPKK_p_p + Raf_p_GTP_Ras; kf_R70*Raf_p_GTP_Ras_2_cplx;
  ReactionFlux70: inact_GEF + GDP_Ras -> basal_GEF_activity_cplx; kf_R71*inact_GEF*GDP_Ras - kr_R71*basal_GEF_activity_cplx;
  ReactionFlux71: basal_GEF_activity_cplx -> inact_GEF + GTP_Ras; kf_R72*basal_GEF_activity_cplx;
  ReactionFlux72: GEF_p + GDP_Ras -> GEF_p_act_Ras_cplx; kf_R73*GEF_p*GDP_Ras - kr_R73*GEF_p_act_Ras_cplx;
  ReactionFlux73: GEF_p_act_Ras_cplx -> GEF_p + GTP_Ras; kf_R74*GEF_p_act_Ras_cplx;
  ReactionFlux74: GAP + GTP_Ras -> GAP_inact_Ras_cplx; kf_R75*GAP*GTP_Ras - kr_R75*GAP_inact_Ras_cplx;
  ReactionFlux75: GAP_inact_Ras_cplx -> GAP + GDP_Ras; kf_R76*GAP_inact_Ras_cplx;
  ReactionFlux76: GDP_Ras + CaM_GEF -> CaM_GEF_act_Ras_cplx; kf_R77*GDP_Ras*CaM_GEF - kr_R77*CaM_GEF_act_Ras_cplx;
  ReactionFlux77: CaM_GEF_act_Ras_cplx -> GTP_Ras + CaM_GEF; kf_R78*CaM_GEF_act_Ras_cplx;
  ReactionFlux78: L_EGFR + Ca_PLC_g -> Ca_PLC_g_phospho_cplx; kf_R79*L_EGFR*Ca_PLC_g - kr_R79*Ca_PLC_g_phospho_cplx;
  ReactionFlux79: Ca_PLC_g_phospho_cplx -> Ca_PLC_g_p + L_EGFR; kf_R80*Ca_PLC_g_phospho_cplx;
  ReactionFlux80: L_EGFR + SHC -> SHC_phospho_cplx; kf_R81*L_EGFR*SHC - kr_R81*SHC_phospho_cplx;
  ReactionFlux81: SHC_phospho_cplx -> L_EGFR + SHC_p; kf_R82*SHC_phospho_cplx;
  ReactionFlux82: SHC_p_Sos_Grb2 + GDP_Ras -> Sos_Ras_GEF_cplx; kf_R83*SHC_p_Sos_Grb2*GDP_Ras - kr_R83*Sos_Ras_GEF_cplx;
  ReactionFlux83: Sos_Ras_GEF_cplx -> SHC_p_Sos_Grb2 + GTP_Ras; kf_R84*Sos_Ras_GEF_cplx;
  ReactionFlux84: PIP2 + Ca_PLC_g -> DAG + IP3 + Ca_PLC_g; kf_R85*PIP2*Ca_PLC_g/(kr_R85 + PIP2);
  ReactionFlux85: PIP2 + Ca_PLC_g_p -> DAG + IP3 + Ca_PLC_g_p; kf_R86*PIP2*Ca_PLC_g_p/(kr_R86 + PIP2);
  ReactionFlux86: PLCg_basal + PLC_g -> PLC_g_phospho_cplx; kf_R87*PLCg_basal*PLC_g - kr_R87*PLC_g_phospho_cplx;
  ReactionFlux87: PLC_g_phospho_cplx -> PLCg_basal + PLC_g_p; kf_R88*PLC_g_phospho_cplx;
  ReactionFlux88: MKP_1 + MAPK_p -> MKP1_tyr_deph_cplx; kf_R89*MKP_1*MAPK_p - kr_R89*MKP1_tyr_deph_cplx;
  ReactionFlux89: MKP1_tyr_deph_cplx -> MAPK + MKP_1; kf_R90*MKP1_tyr_deph_cplx;
  ReactionFlux90: MAPK_p_p + MKP_1 -> MKP1_thr_deph_cplx; kf_R91*MAPK_p_p*MKP_1 - kr_R91*MKP1_thr_deph_cplx;
  ReactionFlux91: MKP1_thr_deph_cplx -> MKP_1 + MAPK_p; kf_R92*MKP1_thr_deph_cplx;
  ReactionFlux92: craf_1_p + PPhosphatase2A -> craf_dephospho_cplx; kf_R93*craf_1_p*PPhosphatase2A - kr_R93*craf_dephospho_cplx;
  ReactionFlux93: craf_dephospho_cplx -> craf_1 + PPhosphatase2A; kf_R94*craf_dephospho_cplx;
  ReactionFlux94: MAPKK_p_p + PPhosphatase2A -> MAPKK_dephospho_cplx; kf_R95*MAPKK_p_p*PPhosphatase2A - kr_R95*MAPKK_dephospho_cplx;
  ReactionFlux95: MAPKK_dephospho_cplx -> MAPKK_p + PPhosphatase2A; kf_R96*MAPKK_dephospho_cplx;
  ReactionFlux96: MAPKK_p + PPhosphatase2A -> MAPKK_dephospho_ser_cplx; kf_R97*MAPKK_p*PPhosphatase2A - kr_R97*MAPKK_dephospho_ser_cplx;
  ReactionFlux97: MAPKK_dephospho_ser_cplx -> MAPKK + PPhosphatase2A; kf_R98*MAPKK_dephospho_ser_cplx;
  ReactionFlux98: craf_1_p_p + PPhosphatase2A -> craf_p_p_dephospho_cplx; kf_R99*craf_1_p_p*PPhosphatase2A - kr_R99*craf_p_p_dephospho_cplx;
  ReactionFlux99: craf_p_p_dephospho_cplx -> PPhosphatase2A + craf_1_p; kf_R100*craf_p_p_dephospho_cplx;
  ReactionFlux100: craf_1_p_ser259 + PPhosphatase2A -> deph_raf_ser259_cplx; kf_R101*craf_1_p_ser259*PPhosphatase2A - kr_R101*deph_raf_ser259_cplx;
  ReactionFlux101: deph_raf_ser259_cplx -> craf_1 + PPhosphatase2A; kf_R102*deph_raf_ser259_cplx;

  // Unit definitions:
  unit time = second;
  unit volume = litre;
  unit substance = 1e-3 mole;
  unit length = 1e-6 metre;
  unit area = (1e-6 metre)^2;
  unit millimole_per_litre = 1e-3 mole / litre;
  unit millimolarity = 1e-3 mole / litre;
  unit liter_per_millimole_second = litre / (1e-3 mole * second);
  unit one_over_second = dimensionless / second;
  unit millimole_per_liter = 1e-3 mole / litre;
  unit liter = litre;
end
