// SBML level 2 version 4

model D1_LTP_time_window()

  // Compartments:
  compartment Spine = 1 liter;

  // Species:
  species AC5 in Spine = 700;
  species AC5_ATP in Spine = 0;
  species AC5_Ca in Spine = 0;
  species AC5_Ca_ATP in Spine = 0;
  species AC5_Ca_GaolfGTP in Spine = 0;
  species AC5_Ca_GaolfGTP_ATP in Spine = 0;
  species AC5_GaolfGTP in Spine = 0;
  species AC5_GaolfGTP_ATP in Spine = 0;
  species AMP in Spine = 0;
  species $ATP in Spine = 5000000; ATP is "ATP_expression";
  species B56PP2A in Spine = 2000;
  species B56PP2A_D32p75 in Spine = 0;
  species B56PP2A_pARPP21 in Spine = 0;
  species B56PP2Ap in Spine = 0;
  species B56PP2Ap_D32p75 in Spine = 0;
  species B56PP2Ap_pARPP21 in Spine = 0;
  species B72PP2A in Spine = 2000;
  species B72PP2A_D32p34 in Spine = 0;
  species B72PP2A_D32p75 in Spine = 0;
  species B72PP2A_pARPP21 in Spine = 0;
  species B72PP2A_Ca_D32p34 in Spine = 0;
  species B72PP2A_Ca_D32p75 in Spine = 0;
  species B72PP2A_Ca in Spine = 0;
  species B72PP2A_Ca_pARPP21 in Spine = 0;
  species $Ca in Spine; Ca is "Ca_expression";
  species CaM in Spine = 9000;
  species CaM_Ca2 in Spine = 0;
  species CaM_Ca4 in Spine = 0;
  species CaM_Ca4_pARPP21 in Spine = 0;
  species CaMKII in Spine = 20000;
  species CaMKII_CaM_Ca4 in Spine = 0;
  species CaMKII_CaM in Spine = 0;
  species CaMKII_CaM_Ca2 in Spine = 0;
  species CaMKII_CaM_Ca2_psd in Spine = 0;
  species CaMKII_CaM_psd in Spine = 0;
  species CaMKII_CaM_Ca4_psd in Spine = 0;
  species CaMKII_psd in Spine = 0;
  species cAMP in Spine = 0;
  species Substrate in Spine = 3000;
  species CDK5 in Spine = 1800;
  species CDK5_D32 in Spine = 0;
  species D1R in Spine = 2000;
  species D1R_DA in Spine = 0;
  species D1R_Golf_DA in Spine = 0;
  species D1R_Golf in Spine = 0;
  species D32p34 in Spine = 0;
  species D32p75 in Spine = 0;
  species D32 in Spine = 50000;
  species $DA in Spine; DA is "DA_expression";
  species GaolfGDP in Spine = 0;
  species GaolfGTP in Spine = 0;
  species Gbgolf in Spine = 0;
  species Golf in Spine = 2000;
  species pCaMKII in Spine = 0;
  species pCaMKII_CaM_Ca4 in Spine = 0;
  species pCaMKII_CaM in Spine = 0;
  species pCaMKII_CaM_Ca2 in Spine = 0;
  species pCaMKII_CaM_Ca2_psd in Spine = 0;
  species pCaMKII_CaM_psd in Spine = 0;
  species pCaMKII_CaM_Ca4_psd in Spine = 0;
  species pCaMKII_psd in Spine = 0;
  species pSubstrate in Spine = 0;
  species PDE4 in Spine = 2000;
  species PDE4_cAMP in Spine = 0;
  species PDE10r in Spine = 700;
  species PDE10r_cAMP in Spine = 0;
  species PDE10c in Spine = 0;
  species PDE10c_cAMP in Spine = 0;
  species PKA in Spine = 1200;
  species PKAc in Spine = 0;
  species PKAc_B56PP2A in Spine = 0;
  species PKAc_D32 in Spine = 0;
  species PKAc_ARPP21 in Spine = 0;
  species PKA_Ca2MP in Spine = 0;
  species PKA_Ca4MP in Spine = 0;
  species PKAc_D32p75 in Spine = 0;
  species PKAreg in Spine = 0;
  species PP1 in Spine = 3000;
  species PP1_pCaMKII_psd in Spine = 0;
  species PP1_pSubstrate in Spine = 0;
  species PP1_D32p34 in Spine = 0;
  species CaMKII_CaM_Ca4_psd_CaMKII_CaM_Ca4_psd in Spine = 0;
  species pCaMKII_CaM_Ca4_psd_CaMKII_CaM_Ca4_psd in Spine = 0;
  species CaMKII_CaM_Ca4_CaMKII_CaM_Ca4 in Spine = 0;
  species pCaMKII_CaM_Ca4_CaMKII_CaM_Ca4 in Spine = 0;
  species PP2B in Spine = 4000;
  species PP2Bc in Spine = 0;
  species PP2Bc_D32p34 in Spine = 0;
  species PP2B_CaM in Spine = 0;
  species PP2B_CaM_Ca2 in Spine = 0;
  species pARPP21 in Spine = 0;
  species ARPP21 in Spine = 20000;
  species pCaMKII_psd_Substrate in Spine = 0;
  species pCaMKII_CaM_psd_Substrate in Spine = 0;
  species pCaMKII_CaM_Ca2_psd_Substrate in Spine = 0;
  species pCaMKII_CaM_Ca4_psd_Substrate in Spine = 0;
  species CaMKII_CaM_psd_Substrate in Spine = 0;
  species CaMKII_CaM_Ca2_psd_Substrate in Spine = 0;
  species CaMKII_CaM_Ca4_psd_Substrate in Spine = 0;

  // Parameters:
  tau_DA1 = 34.979 millisecond;
  tau_DA2 = 420 millisecond;
  tau_Ca1 = 34.979 millisecond;
  tau_Ca2 = 700 millisecond;
  DA_basal = 20 nanomole_per_liter;
  Ca_basal = 60 nanomole_per_liter;
  kf_R0 = 0.03 one_over_millisecond;
  kf_R1 = 0.015 one_over_millisecond;
  kf_R2 = 5e-5 liter_per_nanomole_millisecond;
  kr_R2 = 0.25 one_over_millisecond;
  kf_R3 = 5e-5 liter_per_nanomole_millisecond;
  kr_R3 = 0.25 one_over_millisecond;
  kf_R4 = 0.01 liter_per_nanomole_millisecond;
  kr_R4 = 0.001 one_over_millisecond;
  kf_R5 = 6e-6 liter_per_nanomole_millisecond;
  kr_R5 = 0.02 one_over_millisecond;
  kf_R6 = 0.0001 liter_per_nanomole_millisecond;
  kr_R6 = 3 one_over_millisecond;
  kf_R7 = 0.0001 liter_per_nanomole_millisecond;
  kr_R7 = 3e-6 one_over_millisecond;
  kf_R8 = 1e-5 liter_per_nanomole_millisecond;
  kr_R8 = 0.2 one_over_millisecond;
  kf_R9 = 0.01 one_over_millisecond;
  kf_R10 = 1e-6 liter_per_nanomole_millisecond;
  kr_R10 = 0.0003 one_over_millisecond;
  kf_R11 = 0.0002 one_over_millisecond;
  kf_R12 = 0.001 liter_per_nanomole_millisecond;
  kr_R12 = 0.0015 one_over_millisecond;
  kf_R13 = 1e-6 liter_per_nanomole_millisecond;
  kr_R13 = 0.1 one_over_millisecond;
  kf_R14 = 0.01 one_over_millisecond;
  kf_R15 = 0.0001 liter_per_nanomole_millisecond;
  kr_R15 = 0.1 one_over_millisecond;
  kf_R16 = 1e-5 liter_per_nanomole_millisecond;
  kr_R16 = 0.01 one_over_millisecond;
  kf_R17 = 1.5e-5 liter_per_nanomole_millisecond;
  kr_R17 = 0.1 one_over_millisecond;
  kf_R18 = 8e-6 liter_per_nanomole_millisecond;
  kr_R18 = 0.1 one_over_millisecond;
  kf_R19 = 1.5e-5 liter_per_nanomole_millisecond;
  kr_R19 = 0.1 one_over_millisecond;
  kf_R20 = 0.008 one_over_millisecond;
  kf_R21 = 0.0015 one_over_millisecond;
  kf_R22 = 0.008 one_over_millisecond;
  kf_R23 = 0.0013 liter_per_nanomole_millisecond;
  kr_R23 = 0.0001 one_over_millisecond;
  kf_R24 = 0.0001 liter_per_nanomole_millisecond;
  kr_R24 = 1 one_over_millisecond;
  kf_R25 = 6e-6 liter_per_nanomole_millisecond;
  kr_R25 = 2e-7 one_over_millisecond;
  kf_R26 = 0.0001 liter_per_nanomole_millisecond;
  kr_R26 = 0.1 one_over_millisecond;
  kf_R27 = 0.0001 liter_per_nanomole_millisecond;
  kr_R27 = 3e-5 one_over_millisecond;
  kf_R28 = 1e-6 liter_per_nanomole_millisecond;
  kr_R28 = 0.01 one_over_millisecond;
  kf_R29 = 0.01 liter_per_nanomole_millisecond;
  kr_R29 = 0.001 one_over_millisecond;
  kf_R30 = 8e-6 liter_per_nanomole_millisecond;
  kr_R30 = 0.1 one_over_millisecond;
  kf_R31 = 0.0015 one_over_millisecond;
  kf_R32 = 0.003 one_over_millisecond;
  kf_R33 = 0.003 one_over_millisecond;
  kf_R34 = 5e-7 liter_per_nanomole_millisecond;
  kr_R34 = 0.001 one_over_millisecond;
  kf_R35 = 5e-7 liter_per_nanomole_millisecond;
  kr_R35 = 0.001 one_over_millisecond;
  kf_R36 = 0.0012 one_over_millisecond;
  kf_R37 = 8e-6 one_over_millisecond;
  kf_R38 = 2.6e-5 liter_per_nanomole_millisecond;
  kr_R38 = 0.35 one_over_millisecond;
  kf_R39 = 3.46e-5 liter_per_nanomole_millisecond;
  kr_R39 = 0.05 one_over_millisecond;
  kf_R40 = 0.05 one_over_millisecond;
  kr_R40 = 3e-5 liter_per_nanomole_millisecond;
  kf_R41 = 3e-5 liter_per_nanomole_millisecond;
  kr_R41 = 0.001 one_over_millisecond;
  kf_R42 = 0.0025 one_over_millisecond;
  kf_R43 = 1e-9 liter_square_per_nanomole_square_millisecond;
  kr_R43 = 0.001 one_over_millisecond;
  kf_R44 = 0.003 one_over_millisecond;
  kf_R45 = 0.0001 liter_per_nanomole_millisecond;
  kr_R45 = 0.002 one_over_millisecond;
  kf_R46 = 0.01 one_over_millisecond;
  kf_R47 = 0.1 liter_per_nanomole_millisecond;
  kf_R48 = 2.55e-6 liter_per_nanomole_millisecond;
  kr_R48 = 0.001 one_over_millisecond;
  kf_R49 = 1e-7 liter_per_nanomole_millisecond;
  kr_R49 = 0.001 one_over_millisecond;
  kf_R50 = 7.5e-8 liter_per_nanomole_millisecond;
  kr_R50 = 0.001 one_over_millisecond;
  kf_R51 = 1.3e-6 liter_per_nanomole_millisecond;
  kr_R51 = 0.001 one_over_millisecond;
  kf_R52 = 0.01 liter_per_nanomole_millisecond;
  kr_R52 = 0.001 one_over_millisecond;
  kf_R53 = 0.01 liter_per_nanomole_millisecond;
  kr_R53 = 0.001 one_over_millisecond;
  kf_R54 = 1e-6 liter_per_nanomole_millisecond;
  kr_R54 = 0.01 one_over_millisecond;
  kf_R55 = 0.05 one_over_millisecond;
  kf_R56 = 0.00255 liter_per_nanomole_millisecond;
  kf_R57 = 0.001 one_over_millisecond;
  kf_R58 = 2e-6 liter_per_nanomole_millisecond;
  kf_R59 = 0.0005 one_over_millisecond;
  kf_R60 = 7.5e-7 liter_per_nanomole_millisecond;
  kf_R61 = 0.025 one_over_millisecond;
  kf_R62 = 0.00065 liter_per_nanomole_millisecond;
  kf_R63 = 0.001 one_over_millisecond;
  kf_R64 = 0.001 one_over_millisecond;
  kf_R65 = 0.001 one_over_millisecond;
  kf_R66 = 0.001 one_over_millisecond;
  kf_R67 = 6e-5 liter_per_nanomole_millisecond;
  kr_R67 = 0.25 one_over_millisecond;
  kf_R68 = 6e-5 liter_per_nanomole_millisecond;
  kr_R68 = 0.25 one_over_millisecond;
  kf_R69 = 0.0001 liter_per_nanomole_millisecond;
  kr_R69 = 0.002 one_over_millisecond;
  kf_R70 = 0.0001 liter_per_nanomole_millisecond;
  kr_R70 = 0.04 one_over_millisecond;
  kf_R71 = 0.0001 liter_per_nanomole_millisecond;
  kr_R71 = 0.4 one_over_millisecond;
  kf_R72 = 0.0001 liter_per_nanomole_millisecond;
  kr_R72 = 4 one_over_millisecond;
  kf_R73 = 0.0001 liter_per_nanomole_millisecond;
  kr_R73 = 0.1 one_over_millisecond;
  kf_R74 = 6e-6 liter_per_nanomole_millisecond;
  kr_R74 = 0.002 one_over_millisecond;
  kf_R75 = 0.0001 liter_per_nanomole_millisecond;
  kr_R75 = 0.01 one_over_millisecond;
  kf_R76 = 6e-6 liter_per_nanomole_millisecond;
  kr_R76 = 0.002 one_over_millisecond;
  kf_R77 = 0.0001 liter_per_nanomole_millisecond;
  kr_R77 = 0.0004 one_over_millisecond;
  kf_R78 = 0.0001 liter_per_nanomole_millisecond;
  kr_R78 = 0.04 one_over_millisecond;
  kf_R79 = 0.0001 liter_per_nanomole_millisecond;
  kr_R79 = 0.4 one_over_millisecond;
  kf_R80 = 4.5e-5 liter_per_nanomole_millisecond;
  kr_R80 = 0.2 one_over_millisecond;
  kf_R81 = 0.01 one_over_millisecond;
  kf_R82 = 0.0005 liter_per_nanomole_millisecond;
  kr_R82 = 0.01 one_over_millisecond;
  kf_R83 = 0.01 one_over_millisecond;
  kf_R84 = 7e-6 liter_per_nanomole_millisecond;
  kr_R84 = 0.1 one_over_millisecond;
  kf_R85 = 0.001 one_over_millisecond;
  kf_R86 = 4e-6 liter_per_nanomole_millisecond;
  kr_R86 = 0.1 one_over_millisecond;
  kf_R87 = 0.01 one_over_millisecond;
  kf_R88 = 7e-6 liter_per_nanomole_millisecond;
  kr_R88 = 0.1 one_over_millisecond;
  kf_R89 = 0.001 one_over_millisecond;
  kf_R90 = 4e-6 liter_per_nanomole_millisecond;
  kr_R90 = 0.1 one_over_millisecond;
  kf_R91 = 5e-7 liter_per_nanomole_millisecond;
  kr_R91 = 0.001 one_over_millisecond;
  kf_R92 = 0.01 one_over_millisecond;
  kf_R93 = 5e-7 liter_per_nanomole_millisecond;
  kr_R93 = 0.01 one_over_millisecond;
  kf_R94 = 0.01 one_over_millisecond;
  kf_R95 = 0.0001 one_over_millisecond;
  kf_R96 = 5e-7 liter_per_nanomole_millisecond;
  kr_R96 = 0.01 one_over_millisecond;
  kf_R97 = 0.01 one_over_millisecond;
  kf_R98 = 5e-7 liter_per_nanomole_millisecond;
  kr_R98 = 0.01 one_over_millisecond;
  kf_R99 = 0.01 one_over_millisecond;
  kf_R100 = 5e-7 liter_per_nanomole_millisecond;
  kr_R100 = 0.01 one_over_millisecond;
  kf_R101 = 0.01 one_over_millisecond;
  kf_R102 = 5e-7 liter_per_nanomole_millisecond;
  kr_R102 = 0.01 one_over_millisecond;
  kf_R103 = 0.01 one_over_millisecond;
  kf_R104 = 5e-7 liter_per_nanomole_millisecond;
  kr_R104 = 0.01 one_over_millisecond;
  kf_R105 = 0.01 one_over_millisecond;
  kf_R106 = 5e-7 liter_per_nanomole_millisecond;
  kr_R106 = 0.01 one_over_millisecond;
  kf_R107 = 0.01 one_over_millisecond;
  kf_R108 = 0.0005 one_over_millisecond;
  kr_R108 = 1e-6 one_over_millisecond;
  kf_R109 = 0.0005 one_over_millisecond;
  kr_R109 = 1e-6 one_over_millisecond;
  kf_R110 = 0.0005 one_over_millisecond;
  kr_R110 = 1e-6 one_over_millisecond;
  kf_R111 = 0.0005 one_over_millisecond;
  kr_R111 = 1e-6 one_over_millisecond;
  kf_R112 = 0.0001 liter_per_nanomole_millisecond;
  kr_R112 = 0.0004 one_over_millisecond;
  kf_R113 = 0.0001 liter_per_nanomole_millisecond;
  kr_R113 = 0.04 one_over_millisecond;
  kf_R114 = 0.0001 liter_per_nanomole_millisecond;
  kr_R114 = 0.4 one_over_millisecond;
  kf_R115 = 6e-6 liter_per_nanomole_millisecond;
  kr_R115 = 0.002 one_over_millisecond;
  kf_R116 = 0.0001 liter_per_nanomole_millisecond;
  kr_R116 = 0.01 one_over_millisecond;
  kf_R117 = 8e-7 liter_per_nanomole_millisecond;
  kr_R117 = 0.001 one_over_millisecond;
  kf_R118 = 0.001 one_over_millisecond;
  kf_R119 = 0.0005 one_over_millisecond;
  kf_R120 = 0.0001 liter_per_nanomole_millisecond;
  kr_R120 = 0.04 one_over_millisecond;
  kf_R121 = 0.0001 liter_per_nanomole_millisecond;
  kr_R121 = 0.4 one_over_millisecond;
  kf_R122 = 0.0001 liter_per_nanomole_millisecond;
  kr_R122 = 4 one_over_millisecond;
  kf_R123 = 0.0001 liter_per_nanomole_millisecond;
  kr_R123 = 0.1 one_over_millisecond;
  kf_R124 = 6e-6 liter_per_nanomole_millisecond;
  kr_R124 = 0.002 one_over_millisecond;
  kf_R125 = 0.0005 one_over_millisecond;
  kr_R125 = 0.0005 one_over_millisecond;
  kf_R126 = 0.0005 one_over_millisecond;
  kr_R126 = 0.0005 one_over_millisecond;
  kf_R127 = 0.0005 one_over_millisecond;
  kr_R127 = 0.0005 one_over_millisecond;
  kf_R128 = 0.0005 one_over_millisecond;
  kr_R128 = 0.0005 one_over_millisecond;
  kf_R129 = 1e-6 one_over_millisecond;
  kr_R129 = 0.0005 one_over_millisecond;
  kf_R130 = 3.6e-7 liter_per_nanomole_millisecond;
  kr_R130 = 0.023 one_over_millisecond;
  kf_R131 = 0.0039 one_over_millisecond;
  kf_R132 = 1.1e-6 liter_per_nanomole_millisecond;
  kr_R132 = 0.0054 one_over_millisecond;
  kf_R133 = 10 one_over_millisecond;
  kf_R134 = 3.6e-7 liter_per_nanomole_millisecond;
  kr_R134 = 0.023 one_over_millisecond;
  kf_R135 = 0.0039 one_over_millisecond;
  kf_R136 = 1.1e-6 liter_per_nanomole_millisecond;
  kr_R136 = 0.0054 one_over_millisecond;
  kf_R137 = 10 one_over_millisecond;
  DA_start = 100 millisecond;
  DA_max = 1480 nanomole_per_liter;
  Ca_start = 4000 millisecond;
  Ca_max = 5000 nanomole_per_liter;
  ATP_expression = 5000000 nanomole_per_liter;

  // Assignment rules:
  Ca := Ca_basal + 1/(1 + exp(-10e10*(time - Ca_start)))*(Ca_max/(exp(-tau_Ca1*tau_Ca2/(tau_Ca2 - tau_Ca1)*ln(tau_Ca2/tau_Ca1)/tau_Ca1) - exp(-tau_Ca1*tau_Ca2/(tau_Ca2 - tau_Ca1)*ln(tau_Ca2/tau_Ca1)/tau_Ca2)))*(exp(-(time - Ca_start)/tau_Ca1) - exp(-(time - Ca_start)/tau_Ca2));
  DA := DA_basal + 1/(1 + exp(-10e10*(time - DA_start)))*(DA_max/(exp(-tau_DA1*tau_DA2/(tau_DA2 - tau_DA1)*ln(tau_DA2/tau_DA1)/tau_DA1) - exp(-tau_DA1*tau_DA2/(tau_DA2 - tau_DA1)*ln(tau_DA2/tau_DA1)/tau_DA2)))*(exp(-(time - DA_start)/tau_DA1) - exp(-(time - DA_start)/tau_DA2));

  // Reactions:
  ReactionFlux0: GaolfGTP -> GaolfGDP; kf_R0*GaolfGTP;
  ReactionFlux1: D1R_Golf_DA -> Gbgolf + D1R_DA + GaolfGTP; kf_R1*D1R_Golf_DA;
  ReactionFlux2: D1R_Golf + $DA -> D1R_Golf_DA; kf_R2*D1R_Golf*DA - kr_R2*D1R_Golf_DA;
  ReactionFlux3: D1R + $DA -> D1R_DA; kf_R3*D1R*DA - kr_R3*D1R_DA;
  ReactionFlux4: AC5 + GaolfGTP -> AC5_GaolfGTP; kf_R4*AC5*GaolfGTP - kr_R4*AC5_GaolfGTP;
  ReactionFlux5: CaM + $Ca -> CaM_Ca2; kf_R5*CaM*Ca - kr_R5*CaM_Ca2;
  ReactionFlux6: PP2B + CaM -> PP2B_CaM; kf_R6*PP2B*CaM - kr_R6*PP2B_CaM;
  ReactionFlux7: CaM_Ca4 + PP2B -> PP2Bc; kf_R7*CaM_Ca4*PP2B - kr_R7*PP2Bc;
  ReactionFlux8: PKAc + D32 -> PKAc_D32; kf_R8*PKAc*D32 - kr_R8*PKAc_D32;
  ReactionFlux9: PKAc_D32 -> D32p34 + PKAc; kf_R9*PKAc_D32;
  ReactionFlux10: PKAc + B56PP2A -> PKAc_B56PP2A; kf_R10*PKAc*B56PP2A - kr_R10*PKAc_B56PP2A;
  ReactionFlux11: PKAc_B56PP2A -> B56PP2Ap + PKAc; kf_R11*PKAc_B56PP2A;
  ReactionFlux12: D32p34 + PP1 -> PP1_D32p34; kf_R12*D32p34*PP1 - kr_R12*PP1_D32p34;
  ReactionFlux13: CDK5 + D32 -> CDK5_D32; kf_R13*CDK5*D32 - kr_R13*CDK5_D32;
  ReactionFlux14: CDK5_D32 -> CDK5 + D32p75; kf_R14*CDK5_D32;
  ReactionFlux15: D32p75 + PKAc -> PKAc_D32p75; kf_R15*D32p75*PKAc - kr_R15*PKAc_D32p75;
  ReactionFlux16: B72PP2A + $Ca -> B72PP2A_Ca; kf_R16*B72PP2A*Ca - kr_R16*B72PP2A_Ca;
  ReactionFlux17: B56PP2Ap + D32p75 -> B56PP2Ap_D32p75; kf_R17*B56PP2Ap*D32p75 - kr_R17*B56PP2Ap_D32p75;
  ReactionFlux18: B72PP2A + D32p75 -> B72PP2A_D32p75; kf_R18*B72PP2A*D32p75 - kr_R18*B72PP2A_D32p75;
  ReactionFlux19: D32p75 + B72PP2A_Ca -> B72PP2A_Ca_D32p75; kf_R19*D32p75*B72PP2A_Ca - kr_R19*B72PP2A_Ca_D32p75;
  ReactionFlux20: B56PP2Ap_D32p75 -> B56PP2Ap + D32; kf_R20*B56PP2Ap_D32p75;
  ReactionFlux21: B72PP2A_D32p75 -> B72PP2A + D32; kf_R21*B72PP2A_D32p75;
  ReactionFlux22: B72PP2A_Ca_D32p75 -> B72PP2A_Ca + D32; kf_R22*B72PP2A_Ca_D32p75;
  ReactionFlux23: D32p34 + PP2Bc -> PP2Bc_D32p34; kf_R23*D32p34*PP2Bc - kr_R23*PP2Bc_D32p34;
  ReactionFlux24: CaM_Ca2 + $Ca -> CaM_Ca4; kf_R24*CaM_Ca2*Ca - kr_R24*CaM_Ca4;
  ReactionFlux25: $Ca + PP2B_CaM -> PP2B_CaM_Ca2; kf_R25*Ca*PP2B_CaM - kr_R25*PP2B_CaM_Ca2;
  ReactionFlux26: $Ca + PP2B_CaM_Ca2 -> PP2Bc; kf_R26*Ca*PP2B_CaM_Ca2 - kr_R26*PP2Bc;
  ReactionFlux27: CaM_Ca2 + PP2B -> PP2B_CaM_Ca2; kf_R27*CaM_Ca2*PP2B - kr_R27*PP2B_CaM_Ca2;
  ReactionFlux28: AC5 + $Ca -> AC5_Ca; kf_R28*AC5*Ca - kr_R28*AC5_Ca;
  ReactionFlux29: AC5_Ca + GaolfGTP -> AC5_Ca_GaolfGTP; kf_R29*AC5_Ca*GaolfGTP - kr_R29*AC5_Ca_GaolfGTP;
  ReactionFlux30: D32p75 + B56PP2A -> B56PP2A_D32p75; kf_R30*D32p75*B56PP2A - kr_R30*B56PP2A_D32p75;
  ReactionFlux31: B56PP2A_D32p75 -> B56PP2A + D32; kf_R31*B56PP2A_D32p75;
  ReactionFlux32: B72PP2A_Ca_D32p34 -> B72PP2A_Ca + D32; kf_R32*B72PP2A_Ca_D32p34;
  ReactionFlux33: B72PP2A_D32p34 -> D32 + B72PP2A; kf_R33*B72PP2A_D32p34;
  ReactionFlux34: D32p34 + B72PP2A_Ca -> B72PP2A_Ca_D32p34; kf_R34*D32p34*B72PP2A_Ca - kr_R34*B72PP2A_Ca_D32p34;
  ReactionFlux35: D32p34 + B72PP2A -> B72PP2A_D32p34; kf_R35*D32p34*B72PP2A - kr_R35*B72PP2A_D32p34;
  ReactionFlux36: PP2Bc_D32p34 -> D32 + PP2Bc; kf_R36*PP2Bc_D32p34;
  ReactionFlux37: B56PP2Ap -> B56PP2A; kf_R37*B56PP2Ap;
  ReactionFlux38: cAMP + PKA -> PKA_Ca2MP; kf_R38*cAMP*PKA - kr_R38*PKA_Ca2MP;
  ReactionFlux39: cAMP + PKA_Ca2MP -> PKA_Ca4MP; kf_R39*cAMP*PKA_Ca2MP - kr_R39*PKA_Ca4MP;
  ReactionFlux40: PKA_Ca4MP -> PKAc + PKAreg; kf_R40*PKA_Ca4MP - kr_R40*PKAc*PKAreg;
  ReactionFlux41: cAMP + PDE4 -> PDE4_cAMP; kf_R41*cAMP*PDE4 - kr_R41*PDE4_cAMP;
  ReactionFlux42: PDE4_cAMP -> PDE4 + AMP; kf_R42*PDE4_cAMP;
  ReactionFlux43: PDE10r + 2 cAMP -> PDE10c; kf_R43*PDE10r*cAMP^2 - kr_R43*PDE10c;
  ReactionFlux44: PDE10r_cAMP -> PDE10r + AMP; kf_R44*PDE10r_cAMP;
  ReactionFlux45: cAMP + PDE10r -> PDE10r_cAMP; kf_R45*cAMP*PDE10r - kr_R45*PDE10r_cAMP;
  ReactionFlux46: PDE10c_cAMP -> PDE10c + AMP; kf_R46*PDE10c_cAMP;
  ReactionFlux47: GaolfGDP + Gbgolf -> Golf; kf_R47*GaolfGDP*Gbgolf;
  ReactionFlux48: AC5_GaolfGTP + $ATP -> AC5_GaolfGTP_ATP; kf_R48*AC5_GaolfGTP*ATP - kr_R48*AC5_GaolfGTP_ATP;
  ReactionFlux49: AC5 + $ATP -> AC5_ATP; kf_R49*AC5*ATP - kr_R49*AC5_ATP;
  ReactionFlux50: AC5_Ca + $ATP -> AC5_Ca_ATP; kf_R50*AC5_Ca*ATP - kr_R50*AC5_Ca_ATP;
  ReactionFlux51: AC5_Ca_GaolfGTP + $ATP -> AC5_Ca_GaolfGTP_ATP; kf_R51*AC5_Ca_GaolfGTP*ATP - kr_R51*AC5_Ca_GaolfGTP_ATP;
  ReactionFlux52: GaolfGTP + AC5_ATP -> AC5_GaolfGTP_ATP; kf_R52*GaolfGTP*AC5_ATP - kr_R52*AC5_GaolfGTP_ATP;
  ReactionFlux53: GaolfGTP + AC5_Ca_ATP -> AC5_Ca_GaolfGTP_ATP; kf_R53*GaolfGTP*AC5_Ca_ATP - kr_R53*AC5_Ca_GaolfGTP_ATP;
  ReactionFlux54: $Ca + AC5_ATP -> AC5_Ca_ATP; kf_R54*Ca*AC5_ATP - kr_R54*AC5_Ca_ATP;
  ReactionFlux55: AC5_GaolfGTP_ATP -> cAMP + AC5_GaolfGTP; kf_R55*AC5_GaolfGTP_ATP;
  ReactionFlux56: cAMP + AC5_GaolfGTP -> AC5_GaolfGTP_ATP; kf_R56*cAMP*AC5_GaolfGTP;
  ReactionFlux57: AC5_ATP -> cAMP + AC5; kf_R57*AC5_ATP;
  ReactionFlux58: cAMP + AC5 -> AC5_ATP; kf_R58*cAMP*AC5;
  ReactionFlux59: AC5_Ca_ATP -> cAMP + AC5_Ca; kf_R59*AC5_Ca_ATP;
  ReactionFlux60: cAMP + AC5_Ca -> AC5_Ca_ATP; kf_R60*cAMP*AC5_Ca;
  ReactionFlux61: AC5_Ca_GaolfGTP_ATP -> cAMP + AC5_Ca_GaolfGTP; kf_R61*AC5_Ca_GaolfGTP_ATP;
  ReactionFlux62: cAMP + AC5_Ca_GaolfGTP -> AC5_Ca_GaolfGTP_ATP; kf_R62*cAMP*AC5_Ca_GaolfGTP;
  ReactionFlux63: AC5_GaolfGTP -> AC5 + GaolfGDP; kf_R63*AC5_GaolfGTP;
  ReactionFlux64: AC5_Ca_GaolfGTP -> AC5_Ca + GaolfGDP; kf_R64*AC5_Ca_GaolfGTP;
  ReactionFlux65: AC5_GaolfGTP_ATP -> AC5_ATP + GaolfGDP; kf_R65*AC5_GaolfGTP_ATP;
  ReactionFlux66: AC5_Ca_GaolfGTP_ATP -> AC5_Ca_ATP + GaolfGDP; kf_R66*AC5_Ca_GaolfGTP_ATP;
  ReactionFlux67: D1R + Golf -> D1R_Golf; kf_R67*D1R*Golf - kr_R67*D1R_Golf;
  ReactionFlux68: Golf + D1R_DA -> D1R_Golf_DA; kf_R68*Golf*D1R_DA - kr_R68*D1R_Golf_DA;
  ReactionFlux69: cAMP + PDE10c -> PDE10c_cAMP; kf_R69*cAMP*PDE10c - kr_R69*PDE10c_cAMP;
  ReactionFlux70: CaMKII + CaM_Ca4 -> CaMKII_CaM_Ca4; kf_R70*CaMKII*CaM_Ca4 - kr_R70*CaMKII_CaM_Ca4;
  ReactionFlux71: CaM_Ca2 + CaMKII -> CaMKII_CaM_Ca2; kf_R71*CaM_Ca2*CaMKII - kr_R71*CaMKII_CaM_Ca2;
  ReactionFlux72: CaM + CaMKII -> CaMKII_CaM; kf_R72*CaM*CaMKII - kr_R72*CaMKII_CaM;
  ReactionFlux73: CaMKII_CaM_Ca2 + $Ca -> CaMKII_CaM_Ca4; kf_R73*CaMKII_CaM_Ca2*Ca - kr_R73*CaMKII_CaM_Ca4;
  ReactionFlux74: CaMKII_CaM + $Ca -> CaMKII_CaM_Ca2; kf_R74*CaMKII_CaM*Ca - kr_R74*CaMKII_CaM_Ca2;
  ReactionFlux75: pCaMKII_CaM_Ca2 + $Ca -> pCaMKII_CaM_Ca4; kf_R75*pCaMKII_CaM_Ca2*Ca - kr_R75*pCaMKII_CaM_Ca4;
  ReactionFlux76: pCaMKII_CaM + $Ca -> pCaMKII_CaM_Ca2; kf_R76*pCaMKII_CaM*Ca - kr_R76*pCaMKII_CaM_Ca2;
  ReactionFlux77: pCaMKII + CaM_Ca4 -> pCaMKII_CaM_Ca4; kf_R77*pCaMKII*CaM_Ca4 - kr_R77*pCaMKII_CaM_Ca4;
  ReactionFlux78: pCaMKII + CaM_Ca2 -> pCaMKII_CaM_Ca2; kf_R78*pCaMKII*CaM_Ca2 - kr_R78*pCaMKII_CaM_Ca2;
  ReactionFlux79: pCaMKII + CaM -> pCaMKII_CaM; kf_R79*pCaMKII*CaM - kr_R79*pCaMKII_CaM;
  ReactionFlux80: ARPP21 + PKAc -> PKAc_ARPP21; kf_R80*ARPP21*PKAc - kr_R80*PKAc_ARPP21;
  ReactionFlux81: PKAc_ARPP21 -> PKAc + pARPP21; kf_R81*PKAc_ARPP21;
  ReactionFlux82: pARPP21 + CaM_Ca4 -> CaM_Ca4_pARPP21; kf_R82*pARPP21*CaM_Ca4 - kr_R82*CaM_Ca4_pARPP21;
  ReactionFlux83: B72PP2A_Ca_pARPP21 -> ARPP21 + B72PP2A_Ca; kf_R83*B72PP2A_Ca_pARPP21;
  ReactionFlux84: pARPP21 + B72PP2A_Ca -> B72PP2A_Ca_pARPP21; kf_R84*pARPP21*B72PP2A_Ca - kr_R84*B72PP2A_Ca_pARPP21;
  ReactionFlux85: B72PP2A_pARPP21 -> ARPP21 + B72PP2A; kf_R85*B72PP2A_pARPP21;
  ReactionFlux86: pARPP21 + B72PP2A -> B72PP2A_pARPP21; kf_R86*pARPP21*B72PP2A - kr_R86*B72PP2A_pARPP21;
  ReactionFlux87: B56PP2Ap_pARPP21 -> ARPP21 + B56PP2Ap; kf_R87*B56PP2Ap_pARPP21;
  ReactionFlux88: pARPP21 + B56PP2Ap -> B56PP2Ap_pARPP21; kf_R88*pARPP21*B56PP2Ap - kr_R88*B56PP2Ap_pARPP21;
  ReactionFlux89: B56PP2A_pARPP21 -> ARPP21 + B56PP2A; kf_R89*B56PP2A_pARPP21;
  ReactionFlux90: pARPP21 + B56PP2A -> B56PP2A_pARPP21; kf_R90*pARPP21*B56PP2A - kr_R90*B56PP2A_pARPP21;
  ReactionFlux91: pSubstrate + PP1 -> PP1_pSubstrate; kf_R91*pSubstrate*PP1 - kr_R91*PP1_pSubstrate;
  ReactionFlux92: PP1_pSubstrate -> PP1 + Substrate; kf_R92*PP1_pSubstrate;
  ReactionFlux93: Substrate + pCaMKII_psd -> pCaMKII_psd_Substrate; kf_R93*Substrate*pCaMKII_psd - kr_R93*pCaMKII_psd_Substrate;
  ReactionFlux94: pCaMKII_psd_Substrate -> pCaMKII_psd + pSubstrate; kf_R94*pCaMKII_psd_Substrate;
  ReactionFlux95: pCaMKII -> CaMKII; kf_R95*pCaMKII;
  ReactionFlux96: Substrate + pCaMKII_CaM_psd -> pCaMKII_CaM_psd_Substrate; kf_R96*Substrate*pCaMKII_CaM_psd - kr_R96*pCaMKII_CaM_psd_Substrate;
  ReactionFlux97: pCaMKII_CaM_psd_Substrate -> pCaMKII_CaM_psd + pSubstrate; kf_R97*pCaMKII_CaM_psd_Substrate;
  ReactionFlux98: Substrate + pCaMKII_CaM_Ca2_psd -> pCaMKII_CaM_Ca2_psd_Substrate; kf_R98*Substrate*pCaMKII_CaM_Ca2_psd - kr_R98*pCaMKII_CaM_Ca2_psd_Substrate;
  ReactionFlux99: pCaMKII_CaM_Ca2_psd_Substrate -> pCaMKII_CaM_Ca2_psd + pSubstrate; kf_R99*pCaMKII_CaM_Ca2_psd_Substrate;
  ReactionFlux100: Substrate + pCaMKII_CaM_Ca4_psd -> pCaMKII_CaM_Ca4_psd_Substrate; kf_R100*Substrate*pCaMKII_CaM_Ca4_psd - kr_R100*pCaMKII_CaM_Ca4_psd_Substrate;
  ReactionFlux101: pCaMKII_CaM_Ca4_psd_Substrate -> pCaMKII_CaM_Ca4_psd + pSubstrate; kf_R101*pCaMKII_CaM_Ca4_psd_Substrate;
  ReactionFlux102: Substrate + CaMKII_CaM_psd -> CaMKII_CaM_psd_Substrate; kf_R102*Substrate*CaMKII_CaM_psd - kr_R102*CaMKII_CaM_psd_Substrate;
  ReactionFlux103: CaMKII_CaM_psd_Substrate -> CaMKII_CaM_psd + pSubstrate; kf_R103*CaMKII_CaM_psd_Substrate;
  ReactionFlux104: Substrate + CaMKII_CaM_Ca2_psd -> CaMKII_CaM_Ca2_psd_Substrate; kf_R104*Substrate*CaMKII_CaM_Ca2_psd - kr_R104*CaMKII_CaM_Ca2_psd_Substrate;
  ReactionFlux105: CaMKII_CaM_Ca2_psd_Substrate -> CaMKII_CaM_Ca2_psd + pSubstrate; kf_R105*CaMKII_CaM_Ca2_psd_Substrate;
  ReactionFlux106: Substrate + CaMKII_CaM_Ca4_psd -> CaMKII_CaM_Ca4_psd_Substrate; kf_R106*Substrate*CaMKII_CaM_Ca4_psd - kr_R106*CaMKII_CaM_Ca4_psd_Substrate;
  ReactionFlux107: CaMKII_CaM_Ca4_psd_Substrate -> CaMKII_CaM_Ca4_psd + pSubstrate; kf_R107*CaMKII_CaM_Ca4_psd_Substrate;
  ReactionFlux108: pCaMKII_CaM_Ca4 -> pCaMKII_CaM_Ca4_psd; kf_R108*pCaMKII_CaM_Ca4 - kr_R108*pCaMKII_CaM_Ca4_psd;
  ReactionFlux109: pCaMKII_CaM_Ca2 -> pCaMKII_CaM_Ca2_psd; kf_R109*pCaMKII_CaM_Ca2 - kr_R109*pCaMKII_CaM_Ca2_psd;
  ReactionFlux110: pCaMKII_CaM -> pCaMKII_CaM_psd; kf_R110*pCaMKII_CaM - kr_R110*pCaMKII_CaM_psd;
  ReactionFlux111: pCaMKII -> pCaMKII_psd; kf_R111*pCaMKII - kr_R111*pCaMKII_psd;
  ReactionFlux112: CaM_Ca4 + pCaMKII_psd -> pCaMKII_CaM_Ca4_psd; kf_R112*CaM_Ca4*pCaMKII_psd - kr_R112*pCaMKII_CaM_Ca4_psd;
  ReactionFlux113: pCaMKII_psd + CaM_Ca2 -> pCaMKII_CaM_Ca2_psd; kf_R113*pCaMKII_psd*CaM_Ca2 - kr_R113*pCaMKII_CaM_Ca2_psd;
  ReactionFlux114: CaM + pCaMKII_psd -> pCaMKII_CaM_psd; kf_R114*CaM*pCaMKII_psd - kr_R114*pCaMKII_CaM_psd;
  ReactionFlux115: pCaMKII_CaM_psd + $Ca -> pCaMKII_CaM_Ca2_psd; kf_R115*pCaMKII_CaM_psd*Ca - kr_R115*pCaMKII_CaM_Ca2_psd;
  ReactionFlux116: pCaMKII_CaM_Ca2_psd + $Ca -> pCaMKII_CaM_Ca4_psd; kf_R116*pCaMKII_CaM_Ca2_psd*Ca - kr_R116*pCaMKII_CaM_Ca4_psd;
  ReactionFlux117: pCaMKII_psd + PP1 -> PP1_pCaMKII_psd; kf_R117*pCaMKII_psd*PP1 - kr_R117*PP1_pCaMKII_psd;
  ReactionFlux118: PP1_pCaMKII_psd -> PP1 + CaMKII_psd; kf_R118*PP1_pCaMKII_psd;
  ReactionFlux119: CaMKII_psd -> CaMKII; kf_R119*CaMKII_psd;
  ReactionFlux120: CaM_Ca4 + CaMKII_psd -> CaMKII_CaM_Ca4_psd; kf_R120*CaM_Ca4*CaMKII_psd - kr_R120*CaMKII_CaM_Ca4_psd;
  ReactionFlux121: CaM_Ca2 + CaMKII_psd -> CaMKII_CaM_Ca2_psd; kf_R121*CaM_Ca2*CaMKII_psd - kr_R121*CaMKII_CaM_Ca2_psd;
  ReactionFlux122: CaM + CaMKII_psd -> CaMKII_CaM_psd; kf_R122*CaM*CaMKII_psd - kr_R122*CaMKII_CaM_psd;
  ReactionFlux123: CaMKII_CaM_Ca2_psd + $Ca -> CaMKII_CaM_Ca4_psd; kf_R123*CaMKII_CaM_Ca2_psd*Ca - kr_R123*CaMKII_CaM_Ca4_psd;
  ReactionFlux124: CaMKII_CaM_psd + $Ca -> CaMKII_CaM_Ca2_psd; kf_R124*CaMKII_CaM_psd*Ca - kr_R124*CaMKII_CaM_Ca2_psd;
  ReactionFlux125: CaMKII_CaM -> CaMKII_CaM_psd; kf_R125*CaMKII_CaM - kr_R125*CaMKII_CaM_psd;
  ReactionFlux126: CaMKII_CaM_Ca2 -> CaMKII_CaM_Ca2_psd; kf_R126*CaMKII_CaM_Ca2 - kr_R126*CaMKII_CaM_Ca2_psd;
  ReactionFlux127: CaMKII_CaM_Ca4 -> CaMKII_CaM_Ca4_psd; kf_R127*CaMKII_CaM_Ca4 - kr_R127*CaMKII_CaM_Ca4_psd;
  ReactionFlux128: CaMKII_CaM_Ca4_psd_CaMKII_CaM_Ca4_psd -> CaMKII_CaM_Ca4_CaMKII_CaM_Ca4; kf_R128*CaMKII_CaM_Ca4_psd_CaMKII_CaM_Ca4_psd - kr_R128*CaMKII_CaM_Ca4_CaMKII_CaM_Ca4;
  ReactionFlux129: pCaMKII_CaM_Ca4_psd_CaMKII_CaM_Ca4_psd -> pCaMKII_CaM_Ca4_CaMKII_CaM_Ca4; kf_R129*pCaMKII_CaM_Ca4_psd_CaMKII_CaM_Ca4_psd - kr_R129*pCaMKII_CaM_Ca4_CaMKII_CaM_Ca4;
  ReactionFlux130: CaMKII_CaM_Ca4 + CaMKII_CaM_Ca4 -> CaMKII_CaM_Ca4_CaMKII_CaM_Ca4; kf_R130*CaMKII_CaM_Ca4*CaMKII_CaM_Ca4 - kr_R130*CaMKII_CaM_Ca4_CaMKII_CaM_Ca4;
  ReactionFlux131: CaMKII_CaM_Ca4_CaMKII_CaM_Ca4 -> pCaMKII_CaM_Ca4 + CaMKII_CaM_Ca4; kf_R131*CaMKII_CaM_Ca4_CaMKII_CaM_Ca4;
  ReactionFlux132: pCaMKII_CaM_Ca4 + CaMKII_CaM_Ca4 -> pCaMKII_CaM_Ca4_CaMKII_CaM_Ca4; kf_R132*pCaMKII_CaM_Ca4*CaMKII_CaM_Ca4 - kr_R132*pCaMKII_CaM_Ca4_CaMKII_CaM_Ca4;
  ReactionFlux133: pCaMKII_CaM_Ca4_CaMKII_CaM_Ca4 -> pCaMKII_CaM_Ca4 + pCaMKII_CaM_Ca4; kf_R133*pCaMKII_CaM_Ca4_CaMKII_CaM_Ca4;
  ReactionFlux134: CaMKII_CaM_Ca4_psd + CaMKII_CaM_Ca4_psd -> CaMKII_CaM_Ca4_psd_CaMKII_CaM_Ca4_psd; kf_R134*CaMKII_CaM_Ca4_psd*CaMKII_CaM_Ca4_psd - kr_R134*CaMKII_CaM_Ca4_psd_CaMKII_CaM_Ca4_psd;
  ReactionFlux135: CaMKII_CaM_Ca4_psd_CaMKII_CaM_Ca4_psd -> pCaMKII_CaM_Ca4_psd + CaMKII_CaM_Ca4_psd; kf_R135*CaMKII_CaM_Ca4_psd_CaMKII_CaM_Ca4_psd;
  ReactionFlux136: pCaMKII_CaM_Ca4_psd + CaMKII_CaM_Ca4_psd -> pCaMKII_CaM_Ca4_psd_CaMKII_CaM_Ca4_psd; kf_R136*pCaMKII_CaM_Ca4_psd*CaMKII_CaM_Ca4_psd - kr_R136*pCaMKII_CaM_Ca4_psd_CaMKII_CaM_Ca4_psd;
  ReactionFlux137: pCaMKII_CaM_Ca4_psd_CaMKII_CaM_Ca4_psd -> pCaMKII_CaM_Ca4_psd + pCaMKII_CaM_Ca4_psd; kf_R137*pCaMKII_CaM_Ca4_psd_CaMKII_CaM_Ca4_psd;

  // Unit definitions:
  unit time = 1e-3 second;
  unit substance = 1e-9 mole;
  unit length = 1e-9 metre;
  unit area = (1e-9 metre)^2;
  unit volume = litre;
  unit nanomole_per_liter = 1e-9 mole / litre;
  unit one_over_millisecond = dimensionless / (1e-3 second);
  unit liter_per_nanomole_millisecond = litre / (1e-9 mole * 1e-3 second);
  unit liter_square_per_nanomole_square_millisecond = litre^2 / ((1e-9 mole)^2 * 1e-3 second);
  unit millisecond = 1e-3 second;
  unit liter = litre;
end
