// SBML level 2 version 4

model D1_LTP_time_window()

  // Compartments:
  compartment Spine = 1 MWBUILTINUNIT_liter;

  // Species:
  species AC5 in Spine = 700;  // substance in MWBUILTINPREFIX_nano_MWBUILTINUNIT_mole
  species AC5_ATP in Spine = 0;  // substance in MWBUILTINPREFIX_nano_MWBUILTINUNIT_mole
  species AC5_Ca in Spine = 0;  // substance in MWBUILTINPREFIX_nano_MWBUILTINUNIT_mole
  species AC5_Ca_ATP in Spine = 0;  // substance in MWBUILTINPREFIX_nano_MWBUILTINUNIT_mole
  species AC5_Ca_GaolfGTP in Spine = 0;  // substance in MWBUILTINPREFIX_nano_MWBUILTINUNIT_mole
  species AC5_Ca_GaolfGTP_ATP in Spine = 0;  // substance in MWBUILTINPREFIX_nano_MWBUILTINUNIT_mole
  species AC5_GaolfGTP in Spine = 0;  // substance in MWBUILTINPREFIX_nano_MWBUILTINUNIT_mole
  species AC5_GaolfGTP_ATP in Spine = 0;  // substance in MWBUILTINPREFIX_nano_MWBUILTINUNIT_mole
  species $AMP in Spine = 0;  // substance in MWBUILTINPREFIX_nano_MWBUILTINUNIT_mole
  species $ATP in Spine = 5000000;  // substance in MWBUILTINPREFIX_nano_MWBUILTINUNIT_mole
  species B56PP2A in Spine = 2000;  // substance in MWBUILTINPREFIX_nano_MWBUILTINUNIT_mole
  species B56PP2A_D32p75 in Spine = 0;  // substance in MWBUILTINPREFIX_nano_MWBUILTINUNIT_mole
  species B56PP2A_pARPP21 in Spine = 0;  // substance in MWBUILTINPREFIX_nano_MWBUILTINUNIT_mole
  species B56PP2Ap in Spine = 0;  // substance in MWBUILTINPREFIX_nano_MWBUILTINUNIT_mole
  species B56PP2Ap_D32p75 in Spine = 0;  // substance in MWBUILTINPREFIX_nano_MWBUILTINUNIT_mole
  species B56PP2Ap_pARPP21 in Spine = 0;  // substance in MWBUILTINPREFIX_nano_MWBUILTINUNIT_mole
  species B72PP2A in Spine = 2000;  // substance in MWBUILTINPREFIX_nano_MWBUILTINUNIT_mole
  species B72PP2A_D32p34 in Spine = 0;  // substance in MWBUILTINPREFIX_nano_MWBUILTINUNIT_mole
  species B72PP2A_D32p75 in Spine = 0;  // substance in MWBUILTINPREFIX_nano_MWBUILTINUNIT_mole
  species B72PP2A_pARPP21 in Spine = 0;  // substance in MWBUILTINPREFIX_nano_MWBUILTINUNIT_mole
  species B72PP2A_Ca_D32p34 in Spine = 0;  // substance in MWBUILTINPREFIX_nano_MWBUILTINUNIT_mole
  species B72PP2A_Ca_D32p75 in Spine = 0;  // substance in MWBUILTINPREFIX_nano_MWBUILTINUNIT_mole
  species B72PP2A_Ca in Spine = 0;  // substance in MWBUILTINPREFIX_nano_MWBUILTINUNIT_mole
  species B72PP2A_Ca_pARPP21 in Spine = 0;  // substance in MWBUILTINPREFIX_nano_MWBUILTINUNIT_mole
  species $Ca in Spine = 60;  // substance in MWBUILTINPREFIX_nano_MWBUILTINUNIT_mole
  species CaM in Spine = 9000;  // substance in MWBUILTINPREFIX_nano_MWBUILTINUNIT_mole
  species CaM_Ca2 in Spine = 0;  // substance in MWBUILTINPREFIX_nano_MWBUILTINUNIT_mole
  species CaM_Ca4 in Spine = 0;  // substance in MWBUILTINPREFIX_nano_MWBUILTINUNIT_mole
  species CaM_Ca4_pARPP21 in Spine = 0;  // substance in MWBUILTINPREFIX_nano_MWBUILTINUNIT_mole
  species CaMKII in Spine = 20000;  // substance in MWBUILTINPREFIX_nano_MWBUILTINUNIT_mole
  species CaMKII_CaM_Ca4 in Spine = 0;  // substance in MWBUILTINPREFIX_nano_MWBUILTINUNIT_mole
  species CaMKII_CaM in Spine = 0;  // substance in MWBUILTINPREFIX_nano_MWBUILTINUNIT_mole
  species CaMKII_CaM_Ca2 in Spine = 0;  // substance in MWBUILTINPREFIX_nano_MWBUILTINUNIT_mole
  species CaMKII_CaM_Ca2_psd in Spine = 0;  // substance in MWBUILTINPREFIX_nano_MWBUILTINUNIT_mole
  species CaMKII_CaM_psd in Spine = 0;  // substance in MWBUILTINPREFIX_nano_MWBUILTINUNIT_mole
  species CaMKII_CaM_Ca4_psd in Spine = 0;  // substance in MWBUILTINPREFIX_nano_MWBUILTINUNIT_mole
  species CaMKII_psd in Spine = 0;  // substance in MWBUILTINPREFIX_nano_MWBUILTINUNIT_mole
  species cAMP in Spine = 0;  // substance in MWBUILTINPREFIX_nano_MWBUILTINUNIT_mole
  species Substrate in Spine = 3000;  // substance in MWBUILTINPREFIX_nano_MWBUILTINUNIT_mole
  species CDK5 in Spine = 1800;  // substance in MWBUILTINPREFIX_nano_MWBUILTINUNIT_mole
  species CDK5_D32 in Spine = 0;  // substance in MWBUILTINPREFIX_nano_MWBUILTINUNIT_mole
  species D1R in Spine = 2000;  // substance in MWBUILTINPREFIX_nano_MWBUILTINUNIT_mole
  species D1R_DA in Spine = 0;  // substance in MWBUILTINPREFIX_nano_MWBUILTINUNIT_mole
  species D1R_Golf_DA in Spine = 0;  // substance in MWBUILTINPREFIX_nano_MWBUILTINUNIT_mole
  species D1R_Golf in Spine = 0;  // substance in MWBUILTINPREFIX_nano_MWBUILTINUNIT_mole
  species D32p34 in Spine = 0;  // substance in MWBUILTINPREFIX_nano_MWBUILTINUNIT_mole
  species D32p75 in Spine = 0;  // substance in MWBUILTINPREFIX_nano_MWBUILTINUNIT_mole
  species D32 in Spine = 50000;  // substance in MWBUILTINPREFIX_nano_MWBUILTINUNIT_mole
  species $DA in Spine = 20;  // substance in MWBUILTINPREFIX_nano_MWBUILTINUNIT_mole
  species GaolfGDP in Spine = 0;  // substance in MWBUILTINPREFIX_nano_MWBUILTINUNIT_mole
  species GaolfGTP in Spine = 0;  // substance in MWBUILTINPREFIX_nano_MWBUILTINUNIT_mole
  species Gbgolf in Spine = 0;  // substance in MWBUILTINPREFIX_nano_MWBUILTINUNIT_mole
  species Golf in Spine = 2000;  // substance in MWBUILTINPREFIX_nano_MWBUILTINUNIT_mole
  species pCaMKII in Spine = 0;  // substance in MWBUILTINPREFIX_nano_MWBUILTINUNIT_mole
  species pCaMKII_CaM_Ca4 in Spine = 0;  // substance in MWBUILTINPREFIX_nano_MWBUILTINUNIT_mole
  species pCaMKII_CaM in Spine = 0;  // substance in MWBUILTINPREFIX_nano_MWBUILTINUNIT_mole
  species pCaMKII_CaM_Ca2 in Spine = 0;  // substance in MWBUILTINPREFIX_nano_MWBUILTINUNIT_mole
  species pCaMKII_CaM_Ca2_psd in Spine = 0;  // substance in MWBUILTINPREFIX_nano_MWBUILTINUNIT_mole
  species pCaMKII_CaM_psd in Spine = 0;  // substance in MWBUILTINPREFIX_nano_MWBUILTINUNIT_mole
  species pCaMKII_CaM_Ca4_psd in Spine = 0;  // substance in MWBUILTINPREFIX_nano_MWBUILTINUNIT_mole
  species pCaMKII_psd in Spine = 0;  // substance in MWBUILTINPREFIX_nano_MWBUILTINUNIT_mole
  species pSubstrate in Spine = 0;  // substance in MWBUILTINPREFIX_nano_MWBUILTINUNIT_mole
  species PDE4 in Spine = 2000;  // substance in MWBUILTINPREFIX_nano_MWBUILTINUNIT_mole
  species PDE4_cAMP in Spine = 0;  // substance in MWBUILTINPREFIX_nano_MWBUILTINUNIT_mole
  species PDE10r in Spine = 700;  // substance in MWBUILTINPREFIX_nano_MWBUILTINUNIT_mole
  species PDE10r_cAMP in Spine = 0;  // substance in MWBUILTINPREFIX_nano_MWBUILTINUNIT_mole
  species PDE10c in Spine = 0;  // substance in MWBUILTINPREFIX_nano_MWBUILTINUNIT_mole
  species PDE10c_cAMP in Spine = 0;  // substance in MWBUILTINPREFIX_nano_MWBUILTINUNIT_mole
  species PKA in Spine = 1200;  // substance in MWBUILTINPREFIX_nano_MWBUILTINUNIT_mole
  species PKAc in Spine = 0;  // substance in MWBUILTINPREFIX_nano_MWBUILTINUNIT_mole
  species PKAc_B56PP2A in Spine = 0;  // substance in MWBUILTINPREFIX_nano_MWBUILTINUNIT_mole
  species PKAc_D32 in Spine = 0;  // substance in MWBUILTINPREFIX_nano_MWBUILTINUNIT_mole
  species PKAc_ARPP21 in Spine = 0;  // substance in MWBUILTINPREFIX_nano_MWBUILTINUNIT_mole
  species PKA_Ca2MP in Spine = 0;  // substance in MWBUILTINPREFIX_nano_MWBUILTINUNIT_mole
  species PKA_Ca4MP in Spine = 0;  // substance in MWBUILTINPREFIX_nano_MWBUILTINUNIT_mole
  species PKAc_D32p75 in Spine = 0;  // substance in MWBUILTINPREFIX_nano_MWBUILTINUNIT_mole
  species PKAreg in Spine = 0;  // substance in MWBUILTINPREFIX_nano_MWBUILTINUNIT_mole
  species PP1 in Spine = 3000;  // substance in MWBUILTINPREFIX_nano_MWBUILTINUNIT_mole
  species PP1_pCaMKII_psd in Spine = 0;  // substance in MWBUILTINPREFIX_nano_MWBUILTINUNIT_mole
  species PP1_pSubstrate in Spine = 0;  // substance in MWBUILTINPREFIX_nano_MWBUILTINUNIT_mole
  species PP1_D32p34 in Spine = 0;  // substance in MWBUILTINPREFIX_nano_MWBUILTINUNIT_mole
  species CaMKII_CaM_Ca4_psd_CaMKII_CaM_Ca4_psd in Spine = 0;  // substance in MWBUILTINPREFIX_nano_MWBUILTINUNIT_mole
  species pCaMKII_CaM_Ca4_psd_CaMKII_CaM_Ca4_psd in Spine = 0;  // substance in MWBUILTINPREFIX_nano_MWBUILTINUNIT_mole
  species CaMKII_CaM_Ca4_CaMKII_CaM_Ca4 in Spine = 0;  // substance in MWBUILTINPREFIX_nano_MWBUILTINUNIT_mole
  species pCaMKII_CaM_Ca4_CaMKII_CaM_Ca4 in Spine = 0;  // substance in MWBUILTINPREFIX_nano_MWBUILTINUNIT_mole
  species PP2B in Spine = 4000;  // substance in MWBUILTINPREFIX_nano_MWBUILTINUNIT_mole
  species PP2Bc in Spine = 0;  // substance in MWBUILTINPREFIX_nano_MWBUILTINUNIT_mole
  species PP2Bc_D32p34 in Spine = 0;  // substance in MWBUILTINPREFIX_nano_MWBUILTINUNIT_mole
  species PP2B_CaM in Spine = 0;  // substance in MWBUILTINPREFIX_nano_MWBUILTINUNIT_mole
  species PP2B_CaM_Ca2 in Spine = 0;  // substance in MWBUILTINPREFIX_nano_MWBUILTINUNIT_mole
  species pARPP21 in Spine = 0;  // substance in MWBUILTINPREFIX_nano_MWBUILTINUNIT_mole
  species ARPP21 in Spine = 20000;  // substance in MWBUILTINPREFIX_nano_MWBUILTINUNIT_mole
  species pCaMKII_psd_Substrate in Spine = 0;  // substance in MWBUILTINPREFIX_nano_MWBUILTINUNIT_mole
  species pCaMKII_CaM_psd_Substrate in Spine = 0;  // substance in MWBUILTINPREFIX_nano_MWBUILTINUNIT_mole
  species pCaMKII_CaM_Ca2_psd_Substrate in Spine = 0;  // substance in MWBUILTINPREFIX_nano_MWBUILTINUNIT_mole
  species pCaMKII_CaM_Ca4_psd_Substrate in Spine = 0;  // substance in MWBUILTINPREFIX_nano_MWBUILTINUNIT_mole
  species CaMKII_CaM_psd_Substrate in Spine = 0;  // substance in MWBUILTINPREFIX_nano_MWBUILTINUNIT_mole
  species CaMKII_CaM_Ca2_psd_Substrate in Spine = 0;  // substance in MWBUILTINPREFIX_nano_MWBUILTINUNIT_mole
  species CaMKII_CaM_Ca4_psd_Substrate in Spine = 0;  // substance in MWBUILTINPREFIX_nano_MWBUILTINUNIT_mole
  species ATP_expression in Spine = 5000000;  // substance in MWBUILTINPREFIX_nano_MWBUILTINUNIT_mole
  species Ca_expression in Spine;  // substance in MWBUILTINPREFIX_nano_MWBUILTINUNIT_mole
  species DA_expression in Spine;  // substance in MWBUILTINPREFIX_nano_MWBUILTINUNIT_mole

  // Parameters:
  kf_GaolfGTP__GaolfGDP = 0.03 MWDERIVEDUNIT_1__millisecond;
  kf_D1R_Golf_DA__GbgolfXD1R_DAXGaolfGTP = 0.015 MWDERIVEDUNIT_1__millisecond;
  kf_D1R_GolfXDA__D1R_Golf_DA = 5e-5 MWDERIVEDUNIT_1__nanomole__liter_millisecond;
  kr_D1R_GolfXDA__D1R_Golf_DA = 0.25 MWDERIVEDUNIT_1__millisecond;
  kf_D1RXDA__D1R_DA = 5e-5 MWDERIVEDUNIT_1__nanomole__liter_millisecond;
  kr_D1RXDA__D1R_DA = 0.25 MWDERIVEDUNIT_1__millisecond;
  kf_AC5XGaolfGTP__AC5_GaolfGTP = 0.01 MWDERIVEDUNIT_1__nanomole__liter_millisecond;
  kr_AC5XGaolfGTP__AC5_GaolfGTP = 0.001 MWDERIVEDUNIT_1__millisecond;
  kf_CaMXCa__CaM_Ca2 = 6e-6 MWDERIVEDUNIT_1__nanomole__liter_millisecond;
  kr_CaMXCa__CaM_Ca2 = 0.02 MWDERIVEDUNIT_1__millisecond;
  kf_PP2BXCaM__PP2B_CaM = 0.0001 MWDERIVEDUNIT_1__nanomole__liter_millisecond;
  kr_PP2BXCaM__PP2B_CaM = 3 MWDERIVEDUNIT_1__millisecond;
  kf_CaM_Ca4XPP2B__PP2Bc = 0.0001 MWDERIVEDUNIT_1__nanomole__liter_millisecond;
  kr_CaM_Ca4XPP2B__PP2Bc = 3e-6 MWDERIVEDUNIT_1__millisecond;
  kf_PKAcXD32__PKAc_D32 = 1e-5 MWDERIVEDUNIT_1__nanomole__liter_millisecond;
  kr_PKAcXD32__PKAc_D32 = 0.2 MWDERIVEDUNIT_1__millisecond;
  kf_PKAc_D32__D32p34XPKAc = 0.01 MWDERIVEDUNIT_1__millisecond;
  kf_PKAcXB56PP2A__PKAc_B56PP2A = 1e-6 MWDERIVEDUNIT_1__nanomole__liter_millisecond;
  kr_PKAcXB56PP2A__PKAc_B56PP2A = 0.0003 MWDERIVEDUNIT_1__millisecond;
  kf_PKAc_B56PP2A__B56PP2ApXPKAc = 0.0002 MWDERIVEDUNIT_1__millisecond;
  kf_D32p34XPP1__PP1_D32p34 = 0.001 MWDERIVEDUNIT_1__nanomole__liter_millisecond;
  kr_D32p34XPP1__PP1_D32p34 = 0.0015 MWDERIVEDUNIT_1__millisecond;
  kf_CDK5XD32__CDK5_D32 = 1e-6 MWDERIVEDUNIT_1__nanomole__liter_millisecond;
  kr_CDK5XD32__CDK5_D32 = 0.1 MWDERIVEDUNIT_1__millisecond;
  kf_CDK5_D32__CDK5XD32p75 = 0.01 MWDERIVEDUNIT_1__millisecond;
  kf_D32p75XPKAc__PKAc_D32p75 = 0.0001 MWDERIVEDUNIT_1__nanomole__liter_millisecond;
  kr_D32p75XPKAc__PKAc_D32p75 = 0.1 MWDERIVEDUNIT_1__millisecond;
  kf_B72PP2AXCa__B72PP2A_Ca = 1e-5 MWDERIVEDUNIT_1__nanomole__liter_millisecond;
  kr_B72PP2AXCa__B72PP2A_Ca = 0.01 MWDERIVEDUNIT_1__millisecond;
  kf_B56PP2ApXD32p75__B56PP2Ap_D32p75 = 1.5e-5 MWDERIVEDUNIT_1__nanomole__liter_millisecond;
  kr_B56PP2ApXD32p75__B56PP2Ap_D32p75 = 0.1 MWDERIVEDUNIT_1__millisecond;
  kf_B72PP2AXD32p75__B72PP2A_D32p75 = 8e-6 MWDERIVEDUNIT_1__nanomole__liter_millisecond;
  kr_B72PP2AXD32p75__B72PP2A_D32p75 = 0.1 MWDERIVEDUNIT_1__millisecond;
  kf_D32p75XB72PP2A_Ca__B72PP2A_Ca_D32p75 = 1.5e-5 MWDERIVEDUNIT_1__nanomole__liter_millisecond;
  kr_D32p75XB72PP2A_Ca__B72PP2A_Ca_D32p75 = 0.1 MWDERIVEDUNIT_1__millisecond;
  kf_B56PP2Ap_D32p75__B56PP2ApXD32 = 0.008 MWDERIVEDUNIT_1__millisecond;
  kf_B72PP2A_D32p75__B72PP2AXD32 = 0.0015 MWDERIVEDUNIT_1__millisecond;
  kf_B72PP2A_Ca_D32p75__B72PP2A_CaXD32 = 0.008 MWDERIVEDUNIT_1__millisecond;
  kf_D32p34XPP2Bc__PP2Bc_D32p34 = 0.0013 MWDERIVEDUNIT_1__nanomole__liter_millisecond;
  kr_D32p34XPP2Bc__PP2Bc_D32p34 = 0.0001 MWDERIVEDUNIT_1__millisecond;
  kf_CaM_Ca2XCa__CaM_Ca4 = 0.0001 MWDERIVEDUNIT_1__nanomole__liter_millisecond;
  kr_CaM_Ca2XCa__CaM_Ca4 = 1 MWDERIVEDUNIT_1__millisecond;
  kf_CaXPP2B_CaM__PP2B_CaM_Ca2 = 6e-6 MWDERIVEDUNIT_1__nanomole__liter_millisecond;
  kr_CaXPP2B_CaM__PP2B_CaM_Ca2 = 2e-7 MWDERIVEDUNIT_1__millisecond;
  kf_CaXPP2B_CaM_Ca2__PP2Bc = 0.0001 MWDERIVEDUNIT_1__nanomole__liter_millisecond;
  kr_CaXPP2B_CaM_Ca2__PP2Bc = 0.1 MWDERIVEDUNIT_1__millisecond;
  kf_CaM_Ca2XPP2B__PP2B_CaM_Ca2 = 0.0001 MWDERIVEDUNIT_1__nanomole__liter_millisecond;
  kr_CaM_Ca2XPP2B__PP2B_CaM_Ca2 = 3e-5 MWDERIVEDUNIT_1__millisecond;
  kf_AC5XCa__AC5_Ca = 1e-6 MWDERIVEDUNIT_1__nanomole__liter_millisecond;
  kr_AC5XCa__AC5_Ca = 0.01 MWDERIVEDUNIT_1__millisecond;
  kf_AC5_CaXGaolfGTP__AC5_Ca_GaolfGTP = 0.01 MWDERIVEDUNIT_1__nanomole__liter_millisecond;
  kr_AC5_CaXGaolfGTP__AC5_Ca_GaolfGTP = 0.001 MWDERIVEDUNIT_1__millisecond;
  kf_D32p75XB56PP2A__B56PP2A_D32p75 = 8e-6 MWDERIVEDUNIT_1__nanomole__liter_millisecond;
  kr_D32p75XB56PP2A__B56PP2A_D32p75 = 0.1 MWDERIVEDUNIT_1__millisecond;
  kf_B56PP2A_D32p75__B56PP2AXD32 = 0.0015 MWDERIVEDUNIT_1__millisecond;
  kf_B72PP2A_Ca_D32p34__B72PP2A_CaXD32 = 0.003 MWDERIVEDUNIT_1__millisecond;
  kf_B72PP2A_D32p34__D32XB72PP2A = 0.003 MWDERIVEDUNIT_1__millisecond;
  kf_D32p34XB72PP2A_Ca__B72PP2A_Ca_D32p34 = 5e-7 MWDERIVEDUNIT_1__nanomole__liter_millisecond;
  kr_D32p34XB72PP2A_Ca__B72PP2A_Ca_D32p34 = 0.001 MWDERIVEDUNIT_1__millisecond;
  kf_D32p34XB72PP2A__B72PP2A_D32p34 = 5e-7 MWDERIVEDUNIT_1__nanomole__liter_millisecond;
  kr_D32p34XB72PP2A__B72PP2A_D32p34 = 0.001 MWDERIVEDUNIT_1__millisecond;
  kf_PP2Bc_D32p34__D32XPP2Bc = 0.0012 MWDERIVEDUNIT_1__millisecond;
  kf_B56PP2Ap__B56PP2A = 8e-6 MWDERIVEDUNIT_1__millisecond;
  kf_cAMPXPKA__PKA_Ca2MP = 2.6e-5 MWDERIVEDUNIT_1__nanomole__liter_millisecond;
  kr_cAMPXPKA__PKA_Ca2MP = 0.35 MWDERIVEDUNIT_1__millisecond;
  kf_cAMPXPKA_Ca2MP__PKA_Ca4MP = 3.46e-5 MWDERIVEDUNIT_1__nanomole__liter_millisecond;
  kr_cAMPXPKA_Ca2MP__PKA_Ca4MP = 0.05 MWDERIVEDUNIT_1__millisecond;
  kf_PKA_Ca4MP__PKAcXPKAreg = 0.05 MWDERIVEDUNIT_1__millisecond;
  kr_PKA_Ca4MP__PKAcXPKAreg = 3e-5 MWDERIVEDUNIT_1__nanomole__liter_millisecond;
  kf_cAMPXPDE4__PDE4_cAMP = 3e-5 MWDERIVEDUNIT_1__nanomole__liter_millisecond;
  kr_cAMPXPDE4__PDE4_cAMP = 0.001 MWDERIVEDUNIT_1__millisecond;
  kf_PDE4_cAMP__PDE4XAMP = 0.0025 MWDERIVEDUNIT_1__millisecond;
  kf_PDE10rX2_cAMP__PDE10c = 1e-9 MWDERIVEDUNIT_1__nanomole__liter___2_millisecond;
  kr_PDE10rX2_cAMP__PDE10c = 0.001 MWDERIVEDUNIT_1__millisecond;
  kf_PDE10r_cAMP__PDE10rXAMP = 0.003 MWDERIVEDUNIT_1__millisecond;
  kf_cAMPXPDE10r__PDE10r_cAMP = 0.0001 MWDERIVEDUNIT_1__nanomole__liter_millisecond;
  kr_cAMPXPDE10r__PDE10r_cAMP = 0.002 MWDERIVEDUNIT_1__millisecond;
  kf_PDE10c_cAMP__PDE10cXAMP = 0.01 MWDERIVEDUNIT_1__millisecond;
  kf_GaolfGDPXGbgolf__Golf = 0.1 MWDERIVEDUNIT_1__nanomole__liter_millisecond;
  kf_AC5_GaolfGTPXATP__AC5_GaolfGTP_ATP = 2.55e-6 MWDERIVEDUNIT_1__nanomole__liter_millisecond;
  kr_AC5_GaolfGTPXATP__AC5_GaolfGTP_ATP = 0.001 MWDERIVEDUNIT_1__millisecond;
  kf_AC5XATP__AC5_ATP = 1e-7 MWDERIVEDUNIT_1__nanomole__liter_millisecond;
  kr_AC5XATP__AC5_ATP = 0.001 MWDERIVEDUNIT_1__millisecond;
  kf_AC5_CaXATP__AC5_Ca_ATP = 7.5e-8 MWDERIVEDUNIT_1__nanomole__liter_millisecond;
  kr_AC5_CaXATP__AC5_Ca_ATP = 0.001 MWDERIVEDUNIT_1__millisecond;
  kf_AC5_Ca_GaolfGTPXATP__AC5_Ca_GaolfGTP_ATP = 1.3e-6 MWDERIVEDUNIT_1__nanomole__liter_millisecond;
  kr_AC5_Ca_GaolfGTPXATP__AC5_Ca_GaolfGTP_ATP = 0.001 MWDERIVEDUNIT_1__millisecond;
  kf_GaolfGTPXAC5_ATP__AC5_GaolfGTP_ATP = 0.01 MWDERIVEDUNIT_1__nanomole__liter_millisecond;
  kr_GaolfGTPXAC5_ATP__AC5_GaolfGTP_ATP = 0.001 MWDERIVEDUNIT_1__millisecond;
  kf_GaolfGTPXAC5_Ca_ATP__AC5_Ca_GaolfGTP_ATP = 0.01 MWDERIVEDUNIT_1__nanomole__liter_millisecond;
  kr_GaolfGTPXAC5_Ca_ATP__AC5_Ca_GaolfGTP_ATP = 0.001 MWDERIVEDUNIT_1__millisecond;
  kf_CaXAC5_ATP__AC5_Ca_ATP = 1e-6 MWDERIVEDUNIT_1__nanomole__liter_millisecond;
  kr_CaXAC5_ATP__AC5_Ca_ATP = 0.01 MWDERIVEDUNIT_1__millisecond;
  kf_AC5_GaolfGTP_ATP__cAMPXAC5_GaolfGTP = 0.05 MWDERIVEDUNIT_1__millisecond;
  kf_cAMPXAC5_GaolfGTP__AC5_GaolfGTP_ATP = 0.00255 MWDERIVEDUNIT_1__nanomole__liter_millisecond;
  kf_AC5_ATP__cAMPXAC5 = 0.001 MWDERIVEDUNIT_1__millisecond;
  kf_cAMPXAC5__AC5_ATP = 2e-6 MWDERIVEDUNIT_1__nanomole__liter_millisecond;
  kf_AC5_Ca_ATP__cAMPXAC5_Ca = 0.0005 MWDERIVEDUNIT_1__millisecond;
  kf_cAMPXAC5_Ca__AC5_Ca_ATP = 7.5e-7 MWDERIVEDUNIT_1__nanomole__liter_millisecond;
  kf_AC5_Ca_GaolfGTP_ATP__cAMPXAC5_Ca_GaolfGTP = 0.025 MWDERIVEDUNIT_1__millisecond;
  kf_cAMPXAC5_Ca_GaolfGTP__AC5_Ca_GaolfGTP_ATP = 0.00065 MWDERIVEDUNIT_1__nanomole__liter_millisecond;
  kf_AC5_GaolfGTP__AC5XGaolfGDP = 0.001 MWDERIVEDUNIT_1__millisecond;
  kf_AC5_Ca_GaolfGTP__AC5_CaXGaolfGDP = 0.001 MWDERIVEDUNIT_1__millisecond;
  kf_AC5_GaolfGTP_ATP__AC5_ATPXGaolfGDP = 0.001 MWDERIVEDUNIT_1__millisecond;
  kf_AC5_Ca_GaolfGTP_ATP__AC5_Ca_ATPXGaolfGDP = 0.001 MWDERIVEDUNIT_1__millisecond;
  kf_D1RXGolf__D1R_Golf = 6e-5 MWDERIVEDUNIT_1__nanomole__liter_millisecond;
  kr_D1RXGolf__D1R_Golf = 0.25 MWDERIVEDUNIT_1__millisecond;
  kf_GolfXD1R_DA__D1R_Golf_DA = 6e-5 MWDERIVEDUNIT_1__nanomole__liter_millisecond;
  kr_GolfXD1R_DA__D1R_Golf_DA = 0.25 MWDERIVEDUNIT_1__millisecond;
  kf_cAMPXPDE10c__PDE10c_cAMP = 0.0001 MWDERIVEDUNIT_1__nanomole__liter_millisecond;
  kr_cAMPXPDE10c__PDE10c_cAMP = 0.002 MWDERIVEDUNIT_1__millisecond;
  kf_CaMKIIXCaM_Ca4__CaMKII_CaM_Ca4 = 0.0001 MWDERIVEDUNIT_1__nanomole__liter_millisecond;
  kr_CaMKIIXCaM_Ca4__CaMKII_CaM_Ca4 = 0.04 MWDERIVEDUNIT_1__millisecond;
  kf_CaM_Ca2XCaMKII__CaMKII_CaM_Ca2 = 0.0001 MWDERIVEDUNIT_1__nanomole__liter_millisecond;
  kr_CaM_Ca2XCaMKII__CaMKII_CaM_Ca2 = 0.4 MWDERIVEDUNIT_1__millisecond;
  kf_CaMXCaMKII__CaMKII_CaM = 0.0001 MWDERIVEDUNIT_1__nanomole__liter_millisecond;
  kr_CaMXCaMKII__CaMKII_CaM = 4 MWDERIVEDUNIT_1__millisecond;
  kf_CaMKII_CaM_Ca2XCa__CaMKII_CaM_Ca4 = 0.0001 MWDERIVEDUNIT_1__nanomole__liter_millisecond;
  kr_CaMKII_CaM_Ca2XCa__CaMKII_CaM_Ca4 = 0.1 MWDERIVEDUNIT_1__millisecond;
  kf_CaMKII_CaMXCa__CaMKII_CaM_Ca2 = 6e-6 MWDERIVEDUNIT_1__nanomole__liter_millisecond;
  kr_CaMKII_CaMXCa__CaMKII_CaM_Ca2 = 0.002 MWDERIVEDUNIT_1__millisecond;
  kf_pCaMKII_CaM_Ca2XCa__pCaMKII_CaM_Ca4 = 0.0001 MWDERIVEDUNIT_1__nanomole__liter_millisecond;
  kr_pCaMKII_CaM_Ca2XCa__pCaMKII_CaM_Ca4 = 0.01 MWDERIVEDUNIT_1__millisecond;
  kf_pCaMKII_CaMXCa__pCaMKII_CaM_Ca2 = 6e-6 MWDERIVEDUNIT_1__nanomole__liter_millisecond;
  kr_pCaMKII_CaMXCa__pCaMKII_CaM_Ca2 = 0.002 MWDERIVEDUNIT_1__millisecond;
  kf_pCaMKIIXCaM_Ca4__pCaMKII_CaM_Ca4 = 0.0001 MWDERIVEDUNIT_1__nanomole__liter_millisecond;
  kr_pCaMKIIXCaM_Ca4__pCaMKII_CaM_Ca4 = 0.0004 MWDERIVEDUNIT_1__millisecond;
  kf_pCaMKIIXCaM_Ca2__pCaMKII_CaM_Ca2 = 0.0001 MWDERIVEDUNIT_1__nanomole__liter_millisecond;
  kr_pCaMKIIXCaM_Ca2__pCaMKII_CaM_Ca2 = 0.04 MWDERIVEDUNIT_1__millisecond;
  kf_pCaMKIIXCaM__pCaMKII_CaM = 0.0001 MWDERIVEDUNIT_1__nanomole__liter_millisecond;
  kr_pCaMKIIXCaM__pCaMKII_CaM = 0.4 MWDERIVEDUNIT_1__millisecond;
  kf_ARPP21XPKAc__PKAc_ARPP21 = 4.5e-5 MWDERIVEDUNIT_1__nanomole__liter_millisecond;
  kr_ARPP21XPKAc__PKAc_ARPP21 = 0.2 MWDERIVEDUNIT_1__millisecond;
  kf_PKAc_ARPP21__PKAcXpARPP21 = 0.01 MWDERIVEDUNIT_1__millisecond;
  kf_pARPP21XCaM_Ca4__CaM_Ca4_pARPP21 = 0.0005 MWDERIVEDUNIT_1__nanomole__liter_millisecond;
  kr_pARPP21XCaM_Ca4__CaM_Ca4_pARPP21 = 0.01 MWDERIVEDUNIT_1__millisecond;
  kf_B72PP2A_Ca_pARPP21__ARPP21XB72PP2A_Ca = 0.01 MWDERIVEDUNIT_1__millisecond;
  kf_pARPP21XB72PP2A_Ca__B72PP2A_Ca_pARPP21 = 7e-6 MWDERIVEDUNIT_1__nanomole__liter_millisecond;
  kr_pARPP21XB72PP2A_Ca__B72PP2A_Ca_pARPP21 = 0.1 MWDERIVEDUNIT_1__millisecond;
  kf_B72PP2A_pARPP21__ARPP21XB72PP2A = 0.001 MWDERIVEDUNIT_1__millisecond;
  kf_pARPP21XB72PP2A__B72PP2A_pARPP21 = 4e-6 MWDERIVEDUNIT_1__nanomole__liter_millisecond;
  kr_pARPP21XB72PP2A__B72PP2A_pARPP21 = 0.1 MWDERIVEDUNIT_1__millisecond;
  kf_B56PP2Ap_pARPP21__ARPP21XB56PP2Ap = 0.01 MWDERIVEDUNIT_1__millisecond;
  kf_pARPP21XB56PP2Ap__B56PP2Ap_pARPP21 = 7e-6 MWDERIVEDUNIT_1__nanomole__liter_millisecond;
  kr_pARPP21XB56PP2Ap__B56PP2Ap_pARPP21 = 0.1 MWDERIVEDUNIT_1__millisecond;
  kf_B56PP2A_pARPP21__ARPP21XB56PP2A = 0.001 MWDERIVEDUNIT_1__millisecond;
  kf_pARPP21XB56PP2A__B56PP2A_pARPP21 = 4e-6 MWDERIVEDUNIT_1__nanomole__liter_millisecond;
  kr_pARPP21XB56PP2A__B56PP2A_pARPP21 = 0.1 MWDERIVEDUNIT_1__millisecond;
  kf_pSubstrateXPP1__PP1_pSubstrate = 5e-7 MWDERIVEDUNIT_1__nanomole__liter_millisecond;
  kr_pSubstrateXPP1__PP1_pSubstrate = 0.001 MWDERIVEDUNIT_1__millisecond;
  kf_PP1_pSubstrate__PP1XSubstrate = 0.01 MWDERIVEDUNIT_1__millisecond;
  kf_SubstrateXpCaMKII_psd__pCaMKII_psd_Substrate = 5e-7 MWDERIVEDUNIT_1__nanomole__liter_millisecond;
  kr_SubstrateXpCaMKII_psd__pCaMKII_psd_Substrate = 0.01 MWDERIVEDUNIT_1__millisecond;
  kf_pCaMKII_psd_Substrate__pCaMKII_psdXpSubstrate = 0.01 MWDERIVEDUNIT_1__millisecond;
  kf_pCaMKII__CaMKII = 0.0001 MWDERIVEDUNIT_1__millisecond;
  kf_SubstrateXpCaMKII_CaM_psd__pCaMKII_CaM_psd_Substrate = 5e-7 MWDERIVEDUNIT_1__nanomole__liter_millisecond;
  kr_SubstrateXpCaMKII_CaM_psd__pCaMKII_CaM_psd_Substrate = 0.01 MWDERIVEDUNIT_1__millisecond;
  kf_pCaMKII_CaM_psd_Substrate__pCaMKII_CaM_psdXpSubstrate = 0.01 MWDERIVEDUNIT_1__millisecond;
  kf_SubstrateXpCaMKII_CaM_Ca2_psd__pCaMKII_CaM_Ca2_psd_Substrate = 5e-7 MWDERIVEDUNIT_1__nanomole__liter_millisecond;
  kr_SubstrateXpCaMKII_CaM_Ca2_psd__pCaMKII_CaM_Ca2_psd_Substrate = 0.01 MWDERIVEDUNIT_1__millisecond;
  kf_pCaMKII_CaM_Ca2_psd_Substrate__pCaMKII_CaM_Ca2_psdXpSubstrate = 0.01 MWDERIVEDUNIT_1__millisecond;
  kf_SubstrateXpCaMKII_CaM_Ca4_psd__pCaMKII_CaM_Ca4_psd_Substrate = 5e-7 MWDERIVEDUNIT_1__nanomole__liter_millisecond;
  kr_SubstrateXpCaMKII_CaM_Ca4_psd__pCaMKII_CaM_Ca4_psd_Substrate = 0.01 MWDERIVEDUNIT_1__millisecond;
  kf_pCaMKII_CaM_Ca4_psd_Substrate__pCaMKII_CaM_Ca4_psdXpSubstrate = 0.01 MWDERIVEDUNIT_1__millisecond;
  kf_SubstrateXCaMKII_CaM_psd__CaMKII_CaM_psd_Substrate = 5e-7 MWDERIVEDUNIT_1__nanomole__liter_millisecond;
  kr_SubstrateXCaMKII_CaM_psd__CaMKII_CaM_psd_Substrate = 0.01 MWDERIVEDUNIT_1__millisecond;
  kf_CaMKII_CaM_psd_Substrate__CaMKII_CaM_psdXpSubstrate = 0.01 MWDERIVEDUNIT_1__millisecond;
  kf_SubstrateXCaMKII_CaM_Ca2_psd__CaMKII_CaM_Ca2_psd_Substrate = 5e-7 MWDERIVEDUNIT_1__nanomole__liter_millisecond;
  kr_SubstrateXCaMKII_CaM_Ca2_psd__CaMKII_CaM_Ca2_psd_Substrate = 0.01 MWDERIVEDUNIT_1__millisecond;
  kf_CaMKII_CaM_Ca2_psd_Substrate__CaMKII_CaM_Ca2_psdXpSubstrate = 0.01 MWDERIVEDUNIT_1__millisecond;
  kf_SubstrateXCaMKII_CaM_Ca4_psd__CaMKII_CaM_Ca4_psd_Substrate = 5e-7 MWDERIVEDUNIT_1__nanomole__liter_millisecond;
  kr_SubstrateXCaMKII_CaM_Ca4_psd__CaMKII_CaM_Ca4_psd_Substrate = 0.01 MWDERIVEDUNIT_1__millisecond;
  kf_CaMKII_CaM_Ca4_psd_Substrate__CaMKII_CaM_Ca4_psdXpSubstrate = 0.01 MWDERIVEDUNIT_1__millisecond;
  kf_pCaMKII_CaM_Ca4__pCaMKII_CaM_Ca4_psd = 0.0005 MWDERIVEDUNIT_1__millisecond;
  kr_pCaMKII_CaM_Ca4__pCaMKII_CaM_Ca4_psd = 1e-6 MWDERIVEDUNIT_1__millisecond;
  kf_pCaMKII_CaM_Ca2__pCaMKII_CaM_Ca2_psd = 0.0005 MWDERIVEDUNIT_1__millisecond;
  kr_pCaMKII_CaM_Ca2__pCaMKII_CaM_Ca2_psd = 1e-6 MWDERIVEDUNIT_1__millisecond;
  kf_pCaMKII_CaM__pCaMKII_CaM_psd = 0.0005 MWDERIVEDUNIT_1__millisecond;
  kr_pCaMKII_CaM__pCaMKII_CaM_psd = 1e-6 MWDERIVEDUNIT_1__millisecond;
  kf_pCaMKII__pCaMKII_psd = 0.0005 MWDERIVEDUNIT_1__millisecond;
  kr_pCaMKII__pCaMKII_psd = 1e-6 MWDERIVEDUNIT_1__millisecond;
  kf_CaM_Ca4XpCaMKII_psd__pCaMKII_CaM_Ca4_psd = 0.0001 MWDERIVEDUNIT_1__nanomole__liter_millisecond;
  kr_CaM_Ca4XpCaMKII_psd__pCaMKII_CaM_Ca4_psd = 0.0004 MWDERIVEDUNIT_1__millisecond;
  kf_pCaMKII_psdXCaM_Ca2__pCaMKII_CaM_Ca2_psd = 0.0001 MWDERIVEDUNIT_1__nanomole__liter_millisecond;
  kr_pCaMKII_psdXCaM_Ca2__pCaMKII_CaM_Ca2_psd = 0.04 MWDERIVEDUNIT_1__millisecond;
  kf_CaMXpCaMKII_psd__pCaMKII_CaM_psd = 0.0001 MWDERIVEDUNIT_1__nanomole__liter_millisecond;
  kr_CaMXpCaMKII_psd__pCaMKII_CaM_psd = 0.4 MWDERIVEDUNIT_1__millisecond;
  kf_pCaMKII_CaM_psdXCa__pCaMKII_CaM_Ca2_psd = 6e-6 MWDERIVEDUNIT_1__nanomole__liter_millisecond;
  kr_pCaMKII_CaM_psdXCa__pCaMKII_CaM_Ca2_psd = 0.002 MWDERIVEDUNIT_1__millisecond;
  kf_pCaMKII_CaM_Ca2_psdXCa__pCaMKII_CaM_Ca4_psd = 0.0001 MWDERIVEDUNIT_1__nanomole__liter_millisecond;
  kr_pCaMKII_CaM_Ca2_psdXCa__pCaMKII_CaM_Ca4_psd = 0.01 MWDERIVEDUNIT_1__millisecond;
  kf_pCaMKII_psdXPP1__PP1_pCaMKII_psd = 8e-7 MWDERIVEDUNIT_1__nanomole__liter_millisecond;
  kr_pCaMKII_psdXPP1__PP1_pCaMKII_psd = 0.001 MWDERIVEDUNIT_1__millisecond;
  kf_PP1_pCaMKII_psd__PP1XCaMKII_psd = 0.001 MWDERIVEDUNIT_1__millisecond;
  kf_CaMKII_psd__CaMKII = 0.0005 MWDERIVEDUNIT_1__millisecond;
  kf_CaM_Ca4XCaMKII_psd__CaMKII_CaM_Ca4_psd = 0.0001 MWDERIVEDUNIT_1__nanomole__liter_millisecond;
  kr_CaM_Ca4XCaMKII_psd__CaMKII_CaM_Ca4_psd = 0.04 MWDERIVEDUNIT_1__millisecond;
  kf_CaM_Ca2XCaMKII_psd__CaMKII_CaM_Ca2_psd = 0.0001 MWDERIVEDUNIT_1__nanomole__liter_millisecond;
  kr_CaM_Ca2XCaMKII_psd__CaMKII_CaM_Ca2_psd = 0.4 MWDERIVEDUNIT_1__millisecond;
  kf_CaMXCaMKII_psd__CaMKII_CaM_psd = 0.0001 MWDERIVEDUNIT_1__nanomole__liter_millisecond;
  kr_CaMXCaMKII_psd__CaMKII_CaM_psd = 4 MWDERIVEDUNIT_1__millisecond;
  kf_CaMKII_CaM_Ca2_psdXCa__CaMKII_CaM_Ca4_psd = 0.0001 MWDERIVEDUNIT_1__nanomole__liter_millisecond;
  kr_CaMKII_CaM_Ca2_psdXCa__CaMKII_CaM_Ca4_psd = 0.1 MWDERIVEDUNIT_1__millisecond;
  kf_CaMKII_CaM_psdXCa__CaMKII_CaM_Ca2_psd = 6e-6 MWDERIVEDUNIT_1__nanomole__liter_millisecond;
  kr_CaMKII_CaM_psdXCa__CaMKII_CaM_Ca2_psd = 0.002 MWDERIVEDUNIT_1__millisecond;
  kf_CaMKII_CaM__CaMKII_CaM_psd = 0.0005 MWDERIVEDUNIT_1__millisecond;
  kr_CaMKII_CaM__CaMKII_CaM_psd = 0.0005 MWDERIVEDUNIT_1__millisecond;
  kf_CaMKII_CaM_Ca2__CaMKII_CaM_Ca2_psd = 0.0005 MWDERIVEDUNIT_1__millisecond;
  kr_CaMKII_CaM_Ca2__CaMKII_CaM_Ca2_psd = 0.0005 MWDERIVEDUNIT_1__millisecond;
  kf_CaMKII_CaM_Ca4__CaMKII_CaM_Ca4_psd = 0.0005 MWDERIVEDUNIT_1__millisecond;
  kr_CaMKII_CaM_Ca4__CaMKII_CaM_Ca4_psd = 0.0005 MWDERIVEDUNIT_1__millisecond;
  kf_CaMKII_CaM_Ca4_psd_CaMKII_CaM_Ca4_psd__CaMKII_CaM_Ca4_CaMKII_CaM_Ca4 = 0.0005 MWDERIVEDUNIT_1__millisecond;
  kr_CaMKII_CaM_Ca4_psd_CaMKII_CaM_Ca4_psd__CaMKII_CaM_Ca4_CaMKII_CaM_Ca4 = 0.0005 MWDERIVEDUNIT_1__millisecond;
  kf_pCaMKII_CaM_Ca4_psd_CaMKII_CaM_Ca4_psd__pCaMKII_CaM_Ca4_CaMKII_CaM_Ca4 = 1e-6 MWDERIVEDUNIT_1__millisecond;
  kr_pCaMKII_CaM_Ca4_psd_CaMKII_CaM_Ca4_psd__pCaMKII_CaM_Ca4_CaMKII_CaM_Ca4 = 0.0005 MWDERIVEDUNIT_1__millisecond;
  kf_CaMKII_CaM_Ca4XCaMKII_CaM_Ca4__CaMKII_CaM_Ca4_CaMKII_CaM_Ca4 = 3.6e-7 MWDERIVEDUNIT_1__nanomole__liter_millisecond;
  kr_CaMKII_CaM_Ca4XCaMKII_CaM_Ca4__CaMKII_CaM_Ca4_CaMKII_CaM_Ca4 = 0.023 MWDERIVEDUNIT_1__millisecond;
  kf_CaMKII_CaM_Ca4_CaMKII_CaM_Ca4__pCaMKII_CaM_Ca4XCaMKII_CaM_Ca4 = 0.0039 MWDERIVEDUNIT_1__millisecond;
  kf_pCaMKII_CaM_Ca4XCaMKII_CaM_Ca4__pCaMKII_CaM_Ca4_CaMKII_CaM_Ca4 = 1.1e-6 MWDERIVEDUNIT_1__nanomole__liter_millisecond;
  kr_pCaMKII_CaM_Ca4XCaMKII_CaM_Ca4__pCaMKII_CaM_Ca4_CaMKII_CaM_Ca4 = 0.0054 MWDERIVEDUNIT_1__millisecond;
  kf_pCaMKII_CaM_Ca4_CaMKII_CaM_Ca4__pCaMKII_CaM_Ca4XpCaMKII_CaM_Ca4 = 10 MWDERIVEDUNIT_1__millisecond;
  kf_CaMKII_CaM_Ca4_psdXCaMKII_CaM_Ca4_psd__CaMKII_CaM_Ca4_psd_CaMKII_CaM_Ca4_psd = 3.6e-7 MWDERIVEDUNIT_1__nanomole__liter_millisecond;
  kr_CaMKII_CaM_Ca4_psdXCaMKII_CaM_Ca4_psd__CaMKII_CaM_Ca4_psd_CaMKII_CaM_Ca4_psd = 0.023 MWDERIVEDUNIT_1__millisecond;
  kf_CaMKII_CaM_Ca4_psd_CaMKII_CaM_Ca4_psd__pCaMKII_CaM_Ca4_psdXCaMKII_CaM_Ca4_psd = 0.0039 MWDERIVEDUNIT_1__millisecond;
  kf_pCaMKII_CaM_Ca4_psdXCaMKII_CaM_Ca4_psd__pCaMKII_CaM_Ca4_psd_CaMKII_CaM_Ca4_psd = 1.1e-6 MWDERIVEDUNIT_1__nanomole__liter_millisecond;
  kr_pCaMKII_CaM_Ca4_psdXCaMKII_CaM_Ca4_psd__pCaMKII_CaM_Ca4_psd_CaMKII_CaM_Ca4_psd = 0.0054 MWDERIVEDUNIT_1__millisecond;
  kf_pCaMKII_CaM_Ca4_psd_CaMKII_CaM_Ca4_psd__pCaMKII_CaM_Ca4_psdXpCaMKII_CaM_Ca4_psd = 10 MWDERIVEDUNIT_1__millisecond;
  DA_start = 100 MWBUILTINPREFIX_milli_MWBUILTINUNIT_second;
  DA_max = 1480 MWDERIVEDUNIT_nanomole__liter;
  Ca_start = 4000 MWBUILTINPREFIX_milli_MWBUILTINUNIT_second;
  Ca_max = 5000 MWDERIVEDUNIT_nanomole__liter;
  tau_DA1 = 34.979 MWBUILTINPREFIX_milli_MWBUILTINUNIT_second;
  tau_DA2 = 420 MWBUILTINPREFIX_milli_MWBUILTINUNIT_second;
  tau_Ca1 = 34.979 MWBUILTINPREFIX_milli_MWBUILTINUNIT_second;
  tau_Ca2 = 700 MWBUILTINPREFIX_milli_MWBUILTINUNIT_second;
  DA_basal = 20 MWDERIVEDUNIT_nanomole__liter;
  Ca_basal = 60 MWDERIVEDUNIT_nanomole__liter;

  // Assignment rules:
  Ca_expression := Ca_basal + 1/(1 + exp(-10e10*(time - Ca_start)))*(Ca_max/(exp(-tau_Ca1*tau_Ca2/(tau_Ca2 - tau_Ca1)*ln(tau_Ca2/tau_Ca1)/tau_Ca1) - exp(-tau_Ca1*tau_Ca2/(tau_Ca2 - tau_Ca1)*ln(tau_Ca2/tau_Ca1)/tau_Ca2)))*(exp(-(time - Ca_start)/tau_Ca1) - exp(-(time - Ca_start)/tau_Ca2));
  DA_expression := DA_basal + 1/(1 + exp(-10e10*(time - DA_start)))*(DA_max/(exp(-tau_DA1*tau_DA2/(tau_DA2 - tau_DA1)*ln(tau_DA2/tau_DA1)/tau_DA1) - exp(-tau_DA1*tau_DA2/(tau_DA2 - tau_DA1)*ln(tau_DA2/tau_DA1)/tau_DA2)))*(exp(-(time - DA_start)/tau_DA1) - exp(-(time - DA_start)/tau_DA2));

  // Reactions:
  reaction_001: GaolfGTP => GaolfGDP; kf_GaolfGTP__GaolfGDP*GaolfGTP*Spine;
  reaction_002: D1R_Golf_DA => Gbgolf + D1R_DA + GaolfGTP; kf_D1R_Golf_DA__GbgolfXD1R_DAXGaolfGTP*D1R_Golf_DA*Spine;
  reaction_003: D1R_Golf + $DA -> D1R_Golf_DA; kf_D1R_GolfXDA__D1R_Golf_DA*D1R_Golf*DA*Spine - kr_D1R_GolfXDA__D1R_Golf_DA*D1R_Golf_DA*Spine;
  reaction_004: D1R + $DA -> D1R_DA; kf_D1RXDA__D1R_DA*D1R*DA*Spine - kr_D1RXDA__D1R_DA*D1R_DA*Spine;
  reaction_005: AC5 + GaolfGTP -> AC5_GaolfGTP; kf_AC5XGaolfGTP__AC5_GaolfGTP*AC5*GaolfGTP*Spine - kr_AC5XGaolfGTP__AC5_GaolfGTP*AC5_GaolfGTP*Spine;
  reaction_006: CaM + $Ca -> CaM_Ca2; kf_CaMXCa__CaM_Ca2*CaM*Ca*Spine - kr_CaMXCa__CaM_Ca2*CaM_Ca2*Spine;
  reaction_007: PP2B + CaM -> PP2B_CaM; kf_PP2BXCaM__PP2B_CaM*PP2B*CaM*Spine - kr_PP2BXCaM__PP2B_CaM*PP2B_CaM*Spine;
  reaction_008: CaM_Ca4 + PP2B -> PP2Bc; kf_CaM_Ca4XPP2B__PP2Bc*CaM_Ca4*PP2B*Spine - kr_CaM_Ca4XPP2B__PP2Bc*PP2Bc*Spine;
  reaction_009: PKAc + D32 -> PKAc_D32; kf_PKAcXD32__PKAc_D32*PKAc*D32*Spine - kr_PKAcXD32__PKAc_D32*PKAc_D32*Spine;
  reaction_010: PKAc_D32 => D32p34 + PKAc; kf_PKAc_D32__D32p34XPKAc*PKAc_D32*Spine;
  reaction_011: PKAc + B56PP2A -> PKAc_B56PP2A; kf_PKAcXB56PP2A__PKAc_B56PP2A*PKAc*B56PP2A*Spine - kr_PKAcXB56PP2A__PKAc_B56PP2A*PKAc_B56PP2A*Spine;
  reaction_012: PKAc_B56PP2A => B56PP2Ap + PKAc; kf_PKAc_B56PP2A__B56PP2ApXPKAc*PKAc_B56PP2A*Spine;
  reaction_013: D32p34 + PP1 -> PP1_D32p34; kf_D32p34XPP1__PP1_D32p34*D32p34*PP1*Spine - kr_D32p34XPP1__PP1_D32p34*PP1_D32p34*Spine;
  reaction_014: CDK5 + D32 -> CDK5_D32; kf_CDK5XD32__CDK5_D32*CDK5*D32*Spine - kr_CDK5XD32__CDK5_D32*CDK5_D32*Spine;
  reaction_015: CDK5_D32 => CDK5 + D32p75; kf_CDK5_D32__CDK5XD32p75*CDK5_D32*Spine;
  reaction_016: D32p75 + PKAc -> PKAc_D32p75; kf_D32p75XPKAc__PKAc_D32p75*D32p75*PKAc*Spine - kr_D32p75XPKAc__PKAc_D32p75*PKAc_D32p75*Spine;
  reaction_017: B72PP2A + $Ca -> B72PP2A_Ca; kf_B72PP2AXCa__B72PP2A_Ca*B72PP2A*Ca*Spine - kr_B72PP2AXCa__B72PP2A_Ca*B72PP2A_Ca*Spine;
  reaction_018: B56PP2Ap + D32p75 -> B56PP2Ap_D32p75; kf_B56PP2ApXD32p75__B56PP2Ap_D32p75*B56PP2Ap*D32p75*Spine - kr_B56PP2ApXD32p75__B56PP2Ap_D32p75*B56PP2Ap_D32p75*Spine;
  reaction_019: B72PP2A + D32p75 -> B72PP2A_D32p75; kf_B72PP2AXD32p75__B72PP2A_D32p75*B72PP2A*D32p75*Spine - kr_B72PP2AXD32p75__B72PP2A_D32p75*B72PP2A_D32p75*Spine;
  reaction_020: D32p75 + B72PP2A_Ca -> B72PP2A_Ca_D32p75; kf_D32p75XB72PP2A_Ca__B72PP2A_Ca_D32p75*D32p75*B72PP2A_Ca*Spine - kr_D32p75XB72PP2A_Ca__B72PP2A_Ca_D32p75*B72PP2A_Ca_D32p75*Spine;
  reaction_021: B56PP2Ap_D32p75 => B56PP2Ap + D32; kf_B56PP2Ap_D32p75__B56PP2ApXD32*B56PP2Ap_D32p75*Spine;
  reaction_022: B72PP2A_D32p75 => B72PP2A + D32; kf_B72PP2A_D32p75__B72PP2AXD32*B72PP2A_D32p75*Spine;
  reaction_023: B72PP2A_Ca_D32p75 => B72PP2A_Ca + D32; kf_B72PP2A_Ca_D32p75__B72PP2A_CaXD32*B72PP2A_Ca_D32p75*Spine;
  reaction_024: D32p34 + PP2Bc -> PP2Bc_D32p34; kf_D32p34XPP2Bc__PP2Bc_D32p34*D32p34*PP2Bc*Spine - kr_D32p34XPP2Bc__PP2Bc_D32p34*PP2Bc_D32p34*Spine;
  reaction_025: CaM_Ca2 + $Ca -> CaM_Ca4; kf_CaM_Ca2XCa__CaM_Ca4*CaM_Ca2*Ca*Spine - kr_CaM_Ca2XCa__CaM_Ca4*CaM_Ca4*Spine;
  reaction_026: $Ca + PP2B_CaM -> PP2B_CaM_Ca2; kf_CaXPP2B_CaM__PP2B_CaM_Ca2*Ca*PP2B_CaM*Spine - kr_CaXPP2B_CaM__PP2B_CaM_Ca2*PP2B_CaM_Ca2*Spine;
  reaction_027: $Ca + PP2B_CaM_Ca2 -> PP2Bc; kf_CaXPP2B_CaM_Ca2__PP2Bc*Ca*PP2B_CaM_Ca2*Spine - kr_CaXPP2B_CaM_Ca2__PP2Bc*PP2Bc*Spine;
  reaction_028: CaM_Ca2 + PP2B -> PP2B_CaM_Ca2; kf_CaM_Ca2XPP2B__PP2B_CaM_Ca2*CaM_Ca2*PP2B*Spine - kr_CaM_Ca2XPP2B__PP2B_CaM_Ca2*PP2B_CaM_Ca2*Spine;
  reaction_029: AC5 + $Ca -> AC5_Ca; kf_AC5XCa__AC5_Ca*AC5*Ca*Spine - kr_AC5XCa__AC5_Ca*AC5_Ca*Spine;
  reaction_030: AC5_Ca + GaolfGTP -> AC5_Ca_GaolfGTP; kf_AC5_CaXGaolfGTP__AC5_Ca_GaolfGTP*AC5_Ca*GaolfGTP*Spine - kr_AC5_CaXGaolfGTP__AC5_Ca_GaolfGTP*AC5_Ca_GaolfGTP*Spine;
  reaction_031: D32p75 + B56PP2A -> B56PP2A_D32p75; kf_D32p75XB56PP2A__B56PP2A_D32p75*D32p75*B56PP2A*Spine - kr_D32p75XB56PP2A__B56PP2A_D32p75*B56PP2A_D32p75*Spine;
  reaction_032: B56PP2A_D32p75 => B56PP2A + D32; kf_B56PP2A_D32p75__B56PP2AXD32*B56PP2A_D32p75*Spine;
  reaction_033: B72PP2A_Ca_D32p34 => B72PP2A_Ca + D32; kf_B72PP2A_Ca_D32p34__B72PP2A_CaXD32*B72PP2A_Ca_D32p34*Spine;
  reaction_034: B72PP2A_D32p34 => D32 + B72PP2A; kf_B72PP2A_D32p34__D32XB72PP2A*B72PP2A_D32p34*Spine;
  reaction_035: D32p34 + B72PP2A_Ca -> B72PP2A_Ca_D32p34; kf_D32p34XB72PP2A_Ca__B72PP2A_Ca_D32p34*D32p34*B72PP2A_Ca*Spine - kr_D32p34XB72PP2A_Ca__B72PP2A_Ca_D32p34*B72PP2A_Ca_D32p34*Spine;
  reaction_036: D32p34 + B72PP2A -> B72PP2A_D32p34; kf_D32p34XB72PP2A__B72PP2A_D32p34*D32p34*B72PP2A*Spine - kr_D32p34XB72PP2A__B72PP2A_D32p34*B72PP2A_D32p34*Spine;
  reaction_037: PP2Bc_D32p34 => D32 + PP2Bc; kf_PP2Bc_D32p34__D32XPP2Bc*PP2Bc_D32p34*Spine;
  reaction_038: B56PP2Ap => B56PP2A; kf_B56PP2Ap__B56PP2A*B56PP2Ap*Spine;
  reaction_039: cAMP + PKA -> PKA_Ca2MP; kf_cAMPXPKA__PKA_Ca2MP*cAMP*PKA*Spine - kr_cAMPXPKA__PKA_Ca2MP*PKA_Ca2MP*Spine;
  reaction_040: cAMP + PKA_Ca2MP -> PKA_Ca4MP; kf_cAMPXPKA_Ca2MP__PKA_Ca4MP*cAMP*PKA_Ca2MP*Spine - kr_cAMPXPKA_Ca2MP__PKA_Ca4MP*PKA_Ca4MP*Spine;
  reaction_041: PKA_Ca4MP -> PKAc + PKAreg; kf_PKA_Ca4MP__PKAcXPKAreg*PKA_Ca4MP*Spine - kr_PKA_Ca4MP__PKAcXPKAreg*PKAc*PKAreg*Spine;
  reaction_042: cAMP + PDE4 -> PDE4_cAMP; kf_cAMPXPDE4__PDE4_cAMP*cAMP*PDE4*Spine - kr_cAMPXPDE4__PDE4_cAMP*PDE4_cAMP*Spine;
  reaction_043: PDE4_cAMP => PDE4 + $AMP; kf_PDE4_cAMP__PDE4XAMP*PDE4_cAMP*Spine;
  reaction_044: PDE10r + 2 cAMP -> PDE10c; kf_PDE10rX2_cAMP__PDE10c*PDE10r*cAMP^2*Spine - kr_PDE10rX2_cAMP__PDE10c*PDE10c*Spine;
  reaction_045: PDE10r_cAMP => PDE10r + $AMP; kf_PDE10r_cAMP__PDE10rXAMP*PDE10r_cAMP*Spine;
  reaction_046: cAMP + PDE10r -> PDE10r_cAMP; kf_cAMPXPDE10r__PDE10r_cAMP*cAMP*PDE10r*Spine - kr_cAMPXPDE10r__PDE10r_cAMP*PDE10r_cAMP*Spine;
  reaction_047: PDE10c_cAMP => PDE10c + $AMP; kf_PDE10c_cAMP__PDE10cXAMP*PDE10c_cAMP*Spine;
  reaction_048: GaolfGDP + Gbgolf => Golf; kf_GaolfGDPXGbgolf__Golf*GaolfGDP*Gbgolf*Spine;
  reaction_049: AC5_GaolfGTP + $ATP -> AC5_GaolfGTP_ATP; kf_AC5_GaolfGTPXATP__AC5_GaolfGTP_ATP*AC5_GaolfGTP*ATP*Spine - kr_AC5_GaolfGTPXATP__AC5_GaolfGTP_ATP*AC5_GaolfGTP_ATP*Spine;
  reaction_050: AC5 + $ATP -> AC5_ATP; kf_AC5XATP__AC5_ATP*AC5*ATP*Spine - kr_AC5XATP__AC5_ATP*AC5_ATP*Spine;
  reaction_051: AC5_Ca + $ATP -> AC5_Ca_ATP; kf_AC5_CaXATP__AC5_Ca_ATP*AC5_Ca*ATP*Spine - kr_AC5_CaXATP__AC5_Ca_ATP*AC5_Ca_ATP*Spine;
  reaction_052: AC5_Ca_GaolfGTP + $ATP -> AC5_Ca_GaolfGTP_ATP; kf_AC5_Ca_GaolfGTPXATP__AC5_Ca_GaolfGTP_ATP*AC5_Ca_GaolfGTP*ATP*Spine - kr_AC5_Ca_GaolfGTPXATP__AC5_Ca_GaolfGTP_ATP*AC5_Ca_GaolfGTP_ATP*Spine;
  reaction_053: GaolfGTP + AC5_ATP -> AC5_GaolfGTP_ATP; kf_GaolfGTPXAC5_ATP__AC5_GaolfGTP_ATP*GaolfGTP*AC5_ATP*Spine - kr_GaolfGTPXAC5_ATP__AC5_GaolfGTP_ATP*AC5_GaolfGTP_ATP*Spine;
  reaction_054: GaolfGTP + AC5_Ca_ATP -> AC5_Ca_GaolfGTP_ATP; kf_GaolfGTPXAC5_Ca_ATP__AC5_Ca_GaolfGTP_ATP*GaolfGTP*AC5_Ca_ATP*Spine - kr_GaolfGTPXAC5_Ca_ATP__AC5_Ca_GaolfGTP_ATP*AC5_Ca_GaolfGTP_ATP*Spine;
  reaction_055: $Ca + AC5_ATP -> AC5_Ca_ATP; kf_CaXAC5_ATP__AC5_Ca_ATP*Ca*AC5_ATP*Spine - kr_CaXAC5_ATP__AC5_Ca_ATP*AC5_Ca_ATP*Spine;
  reaction_056: AC5_GaolfGTP_ATP => cAMP + AC5_GaolfGTP; kf_AC5_GaolfGTP_ATP__cAMPXAC5_GaolfGTP*AC5_GaolfGTP_ATP*Spine;
  reaction_057: cAMP + AC5_GaolfGTP => AC5_GaolfGTP_ATP; kf_cAMPXAC5_GaolfGTP__AC5_GaolfGTP_ATP*cAMP*AC5_GaolfGTP*Spine;
  reaction_058: AC5_ATP => cAMP + AC5; kf_AC5_ATP__cAMPXAC5*AC5_ATP*Spine;
  reaction_059: cAMP + AC5 => AC5_ATP; kf_cAMPXAC5__AC5_ATP*cAMP*AC5*Spine;
  reaction_060: AC5_Ca_ATP => cAMP + AC5_Ca; kf_AC5_Ca_ATP__cAMPXAC5_Ca*AC5_Ca_ATP*Spine;
  reaction_061: cAMP + AC5_Ca => AC5_Ca_ATP; kf_cAMPXAC5_Ca__AC5_Ca_ATP*cAMP*AC5_Ca*Spine;
  reaction_062: AC5_Ca_GaolfGTP_ATP => cAMP + AC5_Ca_GaolfGTP; kf_AC5_Ca_GaolfGTP_ATP__cAMPXAC5_Ca_GaolfGTP*AC5_Ca_GaolfGTP_ATP*Spine;
  reaction_063: cAMP + AC5_Ca_GaolfGTP => AC5_Ca_GaolfGTP_ATP; kf_cAMPXAC5_Ca_GaolfGTP__AC5_Ca_GaolfGTP_ATP*cAMP*AC5_Ca_GaolfGTP*Spine;
  reaction_064: AC5_GaolfGTP => AC5 + GaolfGDP; kf_AC5_GaolfGTP__AC5XGaolfGDP*AC5_GaolfGTP*Spine;
  reaction_065: AC5_Ca_GaolfGTP => AC5_Ca + GaolfGDP; kf_AC5_Ca_GaolfGTP__AC5_CaXGaolfGDP*AC5_Ca_GaolfGTP*Spine;
  reaction_066: AC5_GaolfGTP_ATP => AC5_ATP + GaolfGDP; kf_AC5_GaolfGTP_ATP__AC5_ATPXGaolfGDP*AC5_GaolfGTP_ATP*Spine;
  reaction_067: AC5_Ca_GaolfGTP_ATP => AC5_Ca_ATP + GaolfGDP; kf_AC5_Ca_GaolfGTP_ATP__AC5_Ca_ATPXGaolfGDP*AC5_Ca_GaolfGTP_ATP*Spine;
  reaction_068: D1R + Golf -> D1R_Golf; kf_D1RXGolf__D1R_Golf*D1R*Golf*Spine - kr_D1RXGolf__D1R_Golf*D1R_Golf*Spine;
  reaction_069: Golf + D1R_DA -> D1R_Golf_DA; kf_GolfXD1R_DA__D1R_Golf_DA*Golf*D1R_DA*Spine - kr_GolfXD1R_DA__D1R_Golf_DA*D1R_Golf_DA*Spine;
  reaction_070: cAMP + PDE10c -> PDE10c_cAMP; kf_cAMPXPDE10c__PDE10c_cAMP*cAMP*PDE10c*Spine - kr_cAMPXPDE10c__PDE10c_cAMP*PDE10c_cAMP*Spine;
  reaction_071: CaMKII + CaM_Ca4 -> CaMKII_CaM_Ca4; kf_CaMKIIXCaM_Ca4__CaMKII_CaM_Ca4*CaMKII*CaM_Ca4*Spine - kr_CaMKIIXCaM_Ca4__CaMKII_CaM_Ca4*CaMKII_CaM_Ca4*Spine;
  reaction_072: CaM_Ca2 + CaMKII -> CaMKII_CaM_Ca2; kf_CaM_Ca2XCaMKII__CaMKII_CaM_Ca2*CaM_Ca2*CaMKII*Spine - kr_CaM_Ca2XCaMKII__CaMKII_CaM_Ca2*CaMKII_CaM_Ca2*Spine;
  reaction_073: CaM + CaMKII -> CaMKII_CaM; kf_CaMXCaMKII__CaMKII_CaM*CaM*CaMKII*Spine - kr_CaMXCaMKII__CaMKII_CaM*CaMKII_CaM*Spine;
  reaction_074: CaMKII_CaM_Ca2 + $Ca -> CaMKII_CaM_Ca4; kf_CaMKII_CaM_Ca2XCa__CaMKII_CaM_Ca4*CaMKII_CaM_Ca2*Ca*Spine - kr_CaMKII_CaM_Ca2XCa__CaMKII_CaM_Ca4*CaMKII_CaM_Ca4*Spine;
  reaction_075: CaMKII_CaM + $Ca -> CaMKII_CaM_Ca2; kf_CaMKII_CaMXCa__CaMKII_CaM_Ca2*CaMKII_CaM*Ca*Spine - kr_CaMKII_CaMXCa__CaMKII_CaM_Ca2*CaMKII_CaM_Ca2*Spine;
  reaction_076: pCaMKII_CaM_Ca2 + $Ca -> pCaMKII_CaM_Ca4; kf_pCaMKII_CaM_Ca2XCa__pCaMKII_CaM_Ca4*pCaMKII_CaM_Ca2*Ca*Spine - kr_pCaMKII_CaM_Ca2XCa__pCaMKII_CaM_Ca4*pCaMKII_CaM_Ca4*Spine;
  reaction_077: pCaMKII_CaM + $Ca -> pCaMKII_CaM_Ca2; kf_pCaMKII_CaMXCa__pCaMKII_CaM_Ca2*pCaMKII_CaM*Ca*Spine - kr_pCaMKII_CaMXCa__pCaMKII_CaM_Ca2*pCaMKII_CaM_Ca2*Spine;
  reaction_078: pCaMKII + CaM_Ca4 -> pCaMKII_CaM_Ca4; kf_pCaMKIIXCaM_Ca4__pCaMKII_CaM_Ca4*pCaMKII*CaM_Ca4*Spine - kr_pCaMKIIXCaM_Ca4__pCaMKII_CaM_Ca4*pCaMKII_CaM_Ca4*Spine;
  reaction_079: pCaMKII + CaM_Ca2 -> pCaMKII_CaM_Ca2; kf_pCaMKIIXCaM_Ca2__pCaMKII_CaM_Ca2*pCaMKII*CaM_Ca2*Spine - kr_pCaMKIIXCaM_Ca2__pCaMKII_CaM_Ca2*pCaMKII_CaM_Ca2*Spine;
  reaction_080: pCaMKII + CaM -> pCaMKII_CaM; kf_pCaMKIIXCaM__pCaMKII_CaM*pCaMKII*CaM*Spine - kr_pCaMKIIXCaM__pCaMKII_CaM*pCaMKII_CaM*Spine;
  reaction_081: ARPP21 + PKAc -> PKAc_ARPP21; kf_ARPP21XPKAc__PKAc_ARPP21*ARPP21*PKAc*Spine - kr_ARPP21XPKAc__PKAc_ARPP21*PKAc_ARPP21*Spine;
  reaction_082: PKAc_ARPP21 => PKAc + pARPP21; kf_PKAc_ARPP21__PKAcXpARPP21*PKAc_ARPP21*Spine;
  reaction_083: pARPP21 + CaM_Ca4 -> CaM_Ca4_pARPP21; kf_pARPP21XCaM_Ca4__CaM_Ca4_pARPP21*pARPP21*CaM_Ca4*Spine - kr_pARPP21XCaM_Ca4__CaM_Ca4_pARPP21*CaM_Ca4_pARPP21*Spine;
  reaction_084: B72PP2A_Ca_pARPP21 => ARPP21 + B72PP2A_Ca; kf_B72PP2A_Ca_pARPP21__ARPP21XB72PP2A_Ca*B72PP2A_Ca_pARPP21*Spine;
  reaction_085: pARPP21 + B72PP2A_Ca -> B72PP2A_Ca_pARPP21; kf_pARPP21XB72PP2A_Ca__B72PP2A_Ca_pARPP21*pARPP21*B72PP2A_Ca*Spine - kr_pARPP21XB72PP2A_Ca__B72PP2A_Ca_pARPP21*B72PP2A_Ca_pARPP21*Spine;
  reaction_086: B72PP2A_pARPP21 => ARPP21 + B72PP2A; kf_B72PP2A_pARPP21__ARPP21XB72PP2A*B72PP2A_pARPP21*Spine;
  reaction_087: pARPP21 + B72PP2A -> B72PP2A_pARPP21; kf_pARPP21XB72PP2A__B72PP2A_pARPP21*pARPP21*B72PP2A*Spine - kr_pARPP21XB72PP2A__B72PP2A_pARPP21*B72PP2A_pARPP21*Spine;
  reaction_088: B56PP2Ap_pARPP21 => ARPP21 + B56PP2Ap; kf_B56PP2Ap_pARPP21__ARPP21XB56PP2Ap*B56PP2Ap_pARPP21*Spine;
  reaction_089: pARPP21 + B56PP2Ap -> B56PP2Ap_pARPP21; kf_pARPP21XB56PP2Ap__B56PP2Ap_pARPP21*pARPP21*B56PP2Ap*Spine - kr_pARPP21XB56PP2Ap__B56PP2Ap_pARPP21*B56PP2Ap_pARPP21*Spine;
  reaction_090: B56PP2A_pARPP21 => ARPP21 + B56PP2A; kf_B56PP2A_pARPP21__ARPP21XB56PP2A*B56PP2A_pARPP21*Spine;
  reaction_091: pARPP21 + B56PP2A -> B56PP2A_pARPP21; kf_pARPP21XB56PP2A__B56PP2A_pARPP21*pARPP21*B56PP2A*Spine - kr_pARPP21XB56PP2A__B56PP2A_pARPP21*B56PP2A_pARPP21*Spine;
  reaction_092: pSubstrate + PP1 -> PP1_pSubstrate; kf_pSubstrateXPP1__PP1_pSubstrate*pSubstrate*PP1*Spine - kr_pSubstrateXPP1__PP1_pSubstrate*PP1_pSubstrate*Spine;
  reaction_093: PP1_pSubstrate => PP1 + Substrate; kf_PP1_pSubstrate__PP1XSubstrate*PP1_pSubstrate*Spine;
  reaction_094: Substrate + pCaMKII_psd -> pCaMKII_psd_Substrate; kf_SubstrateXpCaMKII_psd__pCaMKII_psd_Substrate*Substrate*pCaMKII_psd*Spine - kr_SubstrateXpCaMKII_psd__pCaMKII_psd_Substrate*pCaMKII_psd_Substrate*Spine;
  reaction_095: pCaMKII_psd_Substrate => pCaMKII_psd + pSubstrate; kf_pCaMKII_psd_Substrate__pCaMKII_psdXpSubstrate*pCaMKII_psd_Substrate*Spine;
  reaction_096: pCaMKII => CaMKII; kf_pCaMKII__CaMKII*pCaMKII*Spine;
  reaction_097: Substrate + pCaMKII_CaM_psd -> pCaMKII_CaM_psd_Substrate; kf_SubstrateXpCaMKII_CaM_psd__pCaMKII_CaM_psd_Substrate*Substrate*pCaMKII_CaM_psd*Spine - kr_SubstrateXpCaMKII_CaM_psd__pCaMKII_CaM_psd_Substrate*pCaMKII_CaM_psd_Substrate*Spine;
  reaction_098: pCaMKII_CaM_psd_Substrate => pCaMKII_CaM_psd + pSubstrate; kf_pCaMKII_CaM_psd_Substrate__pCaMKII_CaM_psdXpSubstrate*pCaMKII_CaM_psd_Substrate*Spine;
  reaction_099: Substrate + pCaMKII_CaM_Ca2_psd -> pCaMKII_CaM_Ca2_psd_Substrate; kf_SubstrateXpCaMKII_CaM_Ca2_psd__pCaMKII_CaM_Ca2_psd_Substrate*Substrate*pCaMKII_CaM_Ca2_psd*Spine - kr_SubstrateXpCaMKII_CaM_Ca2_psd__pCaMKII_CaM_Ca2_psd_Substrate*pCaMKII_CaM_Ca2_psd_Substrate*Spine;
  reaction_100: pCaMKII_CaM_Ca2_psd_Substrate => pCaMKII_CaM_Ca2_psd + pSubstrate; kf_pCaMKII_CaM_Ca2_psd_Substrate__pCaMKII_CaM_Ca2_psdXpSubstrate*pCaMKII_CaM_Ca2_psd_Substrate*Spine;
  reaction_101: Substrate + pCaMKII_CaM_Ca4_psd -> pCaMKII_CaM_Ca4_psd_Substrate; kf_SubstrateXpCaMKII_CaM_Ca4_psd__pCaMKII_CaM_Ca4_psd_Substrate*Substrate*pCaMKII_CaM_Ca4_psd*Spine - kr_SubstrateXpCaMKII_CaM_Ca4_psd__pCaMKII_CaM_Ca4_psd_Substrate*pCaMKII_CaM_Ca4_psd_Substrate*Spine;
  reaction_102: pCaMKII_CaM_Ca4_psd_Substrate => pCaMKII_CaM_Ca4_psd + pSubstrate; kf_pCaMKII_CaM_Ca4_psd_Substrate__pCaMKII_CaM_Ca4_psdXpSubstrate*pCaMKII_CaM_Ca4_psd_Substrate*Spine;
  reaction_103: Substrate + CaMKII_CaM_psd -> CaMKII_CaM_psd_Substrate; kf_SubstrateXCaMKII_CaM_psd__CaMKII_CaM_psd_Substrate*Substrate*CaMKII_CaM_psd*Spine - kr_SubstrateXCaMKII_CaM_psd__CaMKII_CaM_psd_Substrate*CaMKII_CaM_psd_Substrate*Spine;
  reaction_104: CaMKII_CaM_psd_Substrate => CaMKII_CaM_psd + pSubstrate; kf_CaMKII_CaM_psd_Substrate__CaMKII_CaM_psdXpSubstrate*CaMKII_CaM_psd_Substrate*Spine;
  reaction_105: Substrate + CaMKII_CaM_Ca2_psd -> CaMKII_CaM_Ca2_psd_Substrate; kf_SubstrateXCaMKII_CaM_Ca2_psd__CaMKII_CaM_Ca2_psd_Substrate*Substrate*CaMKII_CaM_Ca2_psd*Spine - kr_SubstrateXCaMKII_CaM_Ca2_psd__CaMKII_CaM_Ca2_psd_Substrate*CaMKII_CaM_Ca2_psd_Substrate*Spine;
  reaction_106: CaMKII_CaM_Ca2_psd_Substrate => CaMKII_CaM_Ca2_psd + pSubstrate; kf_CaMKII_CaM_Ca2_psd_Substrate__CaMKII_CaM_Ca2_psdXpSubstrate*CaMKII_CaM_Ca2_psd_Substrate*Spine;
  reaction_107: Substrate + CaMKII_CaM_Ca4_psd -> CaMKII_CaM_Ca4_psd_Substrate; kf_SubstrateXCaMKII_CaM_Ca4_psd__CaMKII_CaM_Ca4_psd_Substrate*Substrate*CaMKII_CaM_Ca4_psd*Spine - kr_SubstrateXCaMKII_CaM_Ca4_psd__CaMKII_CaM_Ca4_psd_Substrate*CaMKII_CaM_Ca4_psd_Substrate*Spine;
  reaction_108: CaMKII_CaM_Ca4_psd_Substrate => CaMKII_CaM_Ca4_psd + pSubstrate; kf_CaMKII_CaM_Ca4_psd_Substrate__CaMKII_CaM_Ca4_psdXpSubstrate*CaMKII_CaM_Ca4_psd_Substrate*Spine;
  reaction_109: pCaMKII_CaM_Ca4 -> pCaMKII_CaM_Ca4_psd; kf_pCaMKII_CaM_Ca4__pCaMKII_CaM_Ca4_psd*pCaMKII_CaM_Ca4*Spine - kr_pCaMKII_CaM_Ca4__pCaMKII_CaM_Ca4_psd*pCaMKII_CaM_Ca4_psd*Spine;
  reaction_110: pCaMKII_CaM_Ca2 -> pCaMKII_CaM_Ca2_psd; kf_pCaMKII_CaM_Ca2__pCaMKII_CaM_Ca2_psd*pCaMKII_CaM_Ca2*Spine - kr_pCaMKII_CaM_Ca2__pCaMKII_CaM_Ca2_psd*pCaMKII_CaM_Ca2_psd*Spine;
  reaction_111: pCaMKII_CaM -> pCaMKII_CaM_psd; kf_pCaMKII_CaM__pCaMKII_CaM_psd*pCaMKII_CaM*Spine - kr_pCaMKII_CaM__pCaMKII_CaM_psd*pCaMKII_CaM_psd*Spine;
  reaction_112: pCaMKII -> pCaMKII_psd; kf_pCaMKII__pCaMKII_psd*pCaMKII*Spine - kr_pCaMKII__pCaMKII_psd*pCaMKII_psd*Spine;
  reaction_113: CaM_Ca4 + pCaMKII_psd -> pCaMKII_CaM_Ca4_psd; kf_CaM_Ca4XpCaMKII_psd__pCaMKII_CaM_Ca4_psd*CaM_Ca4*pCaMKII_psd*Spine - kr_CaM_Ca4XpCaMKII_psd__pCaMKII_CaM_Ca4_psd*pCaMKII_CaM_Ca4_psd*Spine;
  reaction_114: pCaMKII_psd + CaM_Ca2 -> pCaMKII_CaM_Ca2_psd; kf_pCaMKII_psdXCaM_Ca2__pCaMKII_CaM_Ca2_psd*pCaMKII_psd*CaM_Ca2*Spine - kr_pCaMKII_psdXCaM_Ca2__pCaMKII_CaM_Ca2_psd*pCaMKII_CaM_Ca2_psd*Spine;
  reaction_115: CaM + pCaMKII_psd -> pCaMKII_CaM_psd; kf_CaMXpCaMKII_psd__pCaMKII_CaM_psd*CaM*pCaMKII_psd*Spine - kr_CaMXpCaMKII_psd__pCaMKII_CaM_psd*pCaMKII_CaM_psd*Spine;
  reaction_116: pCaMKII_CaM_psd + $Ca -> pCaMKII_CaM_Ca2_psd; kf_pCaMKII_CaM_psdXCa__pCaMKII_CaM_Ca2_psd*pCaMKII_CaM_psd*Ca*Spine - kr_pCaMKII_CaM_psdXCa__pCaMKII_CaM_Ca2_psd*pCaMKII_CaM_Ca2_psd*Spine;
  reaction_117: pCaMKII_CaM_Ca2_psd + $Ca -> pCaMKII_CaM_Ca4_psd; kf_pCaMKII_CaM_Ca2_psdXCa__pCaMKII_CaM_Ca4_psd*pCaMKII_CaM_Ca2_psd*Ca*Spine - kr_pCaMKII_CaM_Ca2_psdXCa__pCaMKII_CaM_Ca4_psd*pCaMKII_CaM_Ca4_psd*Spine;
  reaction_118: pCaMKII_psd + PP1 -> PP1_pCaMKII_psd; kf_pCaMKII_psdXPP1__PP1_pCaMKII_psd*pCaMKII_psd*PP1*Spine - kr_pCaMKII_psdXPP1__PP1_pCaMKII_psd*PP1_pCaMKII_psd*Spine;
  reaction_119: PP1_pCaMKII_psd => PP1 + CaMKII_psd; kf_PP1_pCaMKII_psd__PP1XCaMKII_psd*PP1_pCaMKII_psd*Spine;
  reaction_120: CaMKII_psd => CaMKII; kf_CaMKII_psd__CaMKII*CaMKII_psd*Spine;
  reaction_121: CaM_Ca4 + CaMKII_psd -> CaMKII_CaM_Ca4_psd; kf_CaM_Ca4XCaMKII_psd__CaMKII_CaM_Ca4_psd*CaM_Ca4*CaMKII_psd*Spine - kr_CaM_Ca4XCaMKII_psd__CaMKII_CaM_Ca4_psd*CaMKII_CaM_Ca4_psd*Spine;
  reaction_122: CaM_Ca2 + CaMKII_psd -> CaMKII_CaM_Ca2_psd; kf_CaM_Ca2XCaMKII_psd__CaMKII_CaM_Ca2_psd*CaM_Ca2*CaMKII_psd*Spine - kr_CaM_Ca2XCaMKII_psd__CaMKII_CaM_Ca2_psd*CaMKII_CaM_Ca2_psd*Spine;
  reaction_123: CaM + CaMKII_psd -> CaMKII_CaM_psd; kf_CaMXCaMKII_psd__CaMKII_CaM_psd*CaM*CaMKII_psd*Spine - kr_CaMXCaMKII_psd__CaMKII_CaM_psd*CaMKII_CaM_psd*Spine;
  reaction_124: CaMKII_CaM_Ca2_psd + $Ca -> CaMKII_CaM_Ca4_psd; kf_CaMKII_CaM_Ca2_psdXCa__CaMKII_CaM_Ca4_psd*CaMKII_CaM_Ca2_psd*Ca*Spine - kr_CaMKII_CaM_Ca2_psdXCa__CaMKII_CaM_Ca4_psd*CaMKII_CaM_Ca4_psd*Spine;
  reaction_125: CaMKII_CaM_psd + $Ca -> CaMKII_CaM_Ca2_psd; kf_CaMKII_CaM_psdXCa__CaMKII_CaM_Ca2_psd*CaMKII_CaM_psd*Ca*Spine - kr_CaMKII_CaM_psdXCa__CaMKII_CaM_Ca2_psd*CaMKII_CaM_Ca2_psd*Spine;
  reaction_126: CaMKII_CaM -> CaMKII_CaM_psd; kf_CaMKII_CaM__CaMKII_CaM_psd*CaMKII_CaM*Spine - kr_CaMKII_CaM__CaMKII_CaM_psd*CaMKII_CaM_psd*Spine;
  reaction_127: CaMKII_CaM_Ca2 -> CaMKII_CaM_Ca2_psd; kf_CaMKII_CaM_Ca2__CaMKII_CaM_Ca2_psd*CaMKII_CaM_Ca2*Spine - kr_CaMKII_CaM_Ca2__CaMKII_CaM_Ca2_psd*CaMKII_CaM_Ca2_psd*Spine;
  reaction_128: CaMKII_CaM_Ca4 -> CaMKII_CaM_Ca4_psd; kf_CaMKII_CaM_Ca4__CaMKII_CaM_Ca4_psd*CaMKII_CaM_Ca4*Spine - kr_CaMKII_CaM_Ca4__CaMKII_CaM_Ca4_psd*CaMKII_CaM_Ca4_psd*Spine;
  reaction_129: CaMKII_CaM_Ca4_psd_CaMKII_CaM_Ca4_psd -> CaMKII_CaM_Ca4_CaMKII_CaM_Ca4; kf_CaMKII_CaM_Ca4_psd_CaMKII_CaM_Ca4_psd__CaMKII_CaM_Ca4_CaMKII_CaM_Ca4*CaMKII_CaM_Ca4_psd_CaMKII_CaM_Ca4_psd*Spine - kr_CaMKII_CaM_Ca4_psd_CaMKII_CaM_Ca4_psd__CaMKII_CaM_Ca4_CaMKII_CaM_Ca4*CaMKII_CaM_Ca4_CaMKII_CaM_Ca4*Spine;
  reaction_130: pCaMKII_CaM_Ca4_psd_CaMKII_CaM_Ca4_psd -> pCaMKII_CaM_Ca4_CaMKII_CaM_Ca4; kf_pCaMKII_CaM_Ca4_psd_CaMKII_CaM_Ca4_psd__pCaMKII_CaM_Ca4_CaMKII_CaM_Ca4*pCaMKII_CaM_Ca4_psd_CaMKII_CaM_Ca4_psd*Spine - kr_pCaMKII_CaM_Ca4_psd_CaMKII_CaM_Ca4_psd__pCaMKII_CaM_Ca4_CaMKII_CaM_Ca4*pCaMKII_CaM_Ca4_CaMKII_CaM_Ca4*Spine;
  reaction_131: CaMKII_CaM_Ca4 + CaMKII_CaM_Ca4 -> CaMKII_CaM_Ca4_CaMKII_CaM_Ca4; kf_CaMKII_CaM_Ca4XCaMKII_CaM_Ca4__CaMKII_CaM_Ca4_CaMKII_CaM_Ca4*CaMKII_CaM_Ca4*CaMKII_CaM_Ca4*Spine - kr_CaMKII_CaM_Ca4XCaMKII_CaM_Ca4__CaMKII_CaM_Ca4_CaMKII_CaM_Ca4*CaMKII_CaM_Ca4_CaMKII_CaM_Ca4*Spine;
  reaction_132: CaMKII_CaM_Ca4_CaMKII_CaM_Ca4 => pCaMKII_CaM_Ca4 + CaMKII_CaM_Ca4; kf_CaMKII_CaM_Ca4_CaMKII_CaM_Ca4__pCaMKII_CaM_Ca4XCaMKII_CaM_Ca4*CaMKII_CaM_Ca4_CaMKII_CaM_Ca4*Spine;
  reaction_133: pCaMKII_CaM_Ca4 + CaMKII_CaM_Ca4 -> pCaMKII_CaM_Ca4_CaMKII_CaM_Ca4; kf_pCaMKII_CaM_Ca4XCaMKII_CaM_Ca4__pCaMKII_CaM_Ca4_CaMKII_CaM_Ca4*pCaMKII_CaM_Ca4*CaMKII_CaM_Ca4*Spine - kr_pCaMKII_CaM_Ca4XCaMKII_CaM_Ca4__pCaMKII_CaM_Ca4_CaMKII_CaM_Ca4*pCaMKII_CaM_Ca4_CaMKII_CaM_Ca4*Spine;
  reaction_134: pCaMKII_CaM_Ca4_CaMKII_CaM_Ca4 => pCaMKII_CaM_Ca4 + pCaMKII_CaM_Ca4; kf_pCaMKII_CaM_Ca4_CaMKII_CaM_Ca4__pCaMKII_CaM_Ca4XpCaMKII_CaM_Ca4*pCaMKII_CaM_Ca4_CaMKII_CaM_Ca4*Spine;
  reaction_135: CaMKII_CaM_Ca4_psd + CaMKII_CaM_Ca4_psd -> CaMKII_CaM_Ca4_psd_CaMKII_CaM_Ca4_psd; kf_CaMKII_CaM_Ca4_psdXCaMKII_CaM_Ca4_psd__CaMKII_CaM_Ca4_psd_CaMKII_CaM_Ca4_psd*CaMKII_CaM_Ca4_psd*CaMKII_CaM_Ca4_psd*Spine - kr_CaMKII_CaM_Ca4_psdXCaMKII_CaM_Ca4_psd__CaMKII_CaM_Ca4_psd_CaMKII_CaM_Ca4_psd*CaMKII_CaM_Ca4_psd_CaMKII_CaM_Ca4_psd*Spine;
  reaction_136: CaMKII_CaM_Ca4_psd_CaMKII_CaM_Ca4_psd => pCaMKII_CaM_Ca4_psd + CaMKII_CaM_Ca4_psd; kf_CaMKII_CaM_Ca4_psd_CaMKII_CaM_Ca4_psd__pCaMKII_CaM_Ca4_psdXCaMKII_CaM_Ca4_psd*CaMKII_CaM_Ca4_psd_CaMKII_CaM_Ca4_psd*Spine;
  reaction_137: pCaMKII_CaM_Ca4_psd + CaMKII_CaM_Ca4_psd -> pCaMKII_CaM_Ca4_psd_CaMKII_CaM_Ca4_psd; kf_pCaMKII_CaM_Ca4_psdXCaMKII_CaM_Ca4_psd__pCaMKII_CaM_Ca4_psd_CaMKII_CaM_Ca4_psd*pCaMKII_CaM_Ca4_psd*CaMKII_CaM_Ca4_psd*Spine - kr_pCaMKII_CaM_Ca4_psdXCaMKII_CaM_Ca4_psd__pCaMKII_CaM_Ca4_psd_CaMKII_CaM_Ca4_psd*pCaMKII_CaM_Ca4_psd_CaMKII_CaM_Ca4_psd*Spine;
  reaction_138: pCaMKII_CaM_Ca4_psd_CaMKII_CaM_Ca4_psd => pCaMKII_CaM_Ca4_psd + pCaMKII_CaM_Ca4_psd; kf_pCaMKII_CaM_Ca4_psd_CaMKII_CaM_Ca4_psd__pCaMKII_CaM_Ca4_psdXpCaMKII_CaM_Ca4_psd*pCaMKII_CaM_Ca4_psd_CaMKII_CaM_Ca4_psd*Spine;

  // Unit definitions:
  unit area = (1e-3 metre)^2; area is "mm2";
  unit time = 1e-3 second; time is "ms";
  unit volume = 10 litre; volume is "liter";
  unit substance = 1e-9 mole; substance is "nmol";
  unit MWBUILTINUNIT_liter = metre^3 * 1e-3 dimensionless;
  unit MWBUILTINPREFIX_nano_MWBUILTINUNIT_mole = 1e-9 mole; MWBUILTINPREFIX_nano_MWBUILTINUNIT_mole is "nanomole";
  unit MWDERIVEDUNIT_1__millisecond = 1000 dimensionless / second; MWDERIVEDUNIT_1__millisecond is "1/millisecond";
  unit MWDERIVEDUNIT_1__nanomole__liter_millisecond = metre^3 * 1e9 dimensionless / (mole * second); MWDERIVEDUNIT_1__nanomole__liter_millisecond is "1/(nanomole/liter*millisecond)";
  unit MWDERIVEDUNIT_1__nanomole__liter___2_millisecond = metre^6 * 1e15 dimensionless / (mole^2 * second); MWDERIVEDUNIT_1__nanomole__liter___2_millisecond is "1/((nanomole/liter)^2*millisecond)";
  unit MWBUILTINPREFIX_milli_MWBUILTINUNIT_second = 1e-3 second; MWBUILTINPREFIX_milli_MWBUILTINUNIT_second is "millisecond";
  unit MWDERIVEDUNIT_nanomole__liter = mole * 1e-6 dimensionless / metre^3; MWDERIVEDUNIT_nanomole__liter is "nanomole/liter";
end
